#ifndef ANYBODY_PATH_BODY_GENERICBODYMODEL
  #path ANYBODY_PATH_BODY_GENERICBODYMODEL "<ANYBODY_PATH_BODY>\BodyModels\GenericBodyModel\"
#endif

AnyFolder HumanModel={

  AnyFolder BodyModelWithDefaultDrivers = {
    AnyFolder &BodyModel = .BodyModel;
    AnyFolder &Drivers = .DefaultMannequinDrivers;
  };

  #include "<ANYBODY_PATH_BODY_GENERICBODYMODEL>\BodyModel.defaults.preprocess.any"
  #include "<ANYBODY_PATH_BODY_GENERICBODYMODEL>\BodyModel.defaults.any"
  #include "<ANYBODY_PATH_BODY_GENERICBODYMODEL>\BodyModel.BodyPartsSetup.any"
  #include "<ANYBODY_PATH_BODY_GENERICBODYMODEL>\BodyModel.config_info.any"


  #ifdef BM_MANNEQUIN_FILE
    #include "<BM_MANNEQUIN_FILE>"
  #endif

  #if BM_DRAWSETTINGS_SKIP == OFF
  Main = {
    #include "<BM_DRAWSETTINGS_FILE>"
  };
  #endif
  // actual body model


  #include  "<ANYBODY_PATH_BODY_GENERICBODYMODEL>\BodyModel.NEW.any"

  AnyFolder StrengthParameters={
    AnyVar SpecificMuscleTensionSpine= BM_TRUNK_STRENGTH_INDEX*90; //N/cm^2
    AnyVar StrengthIndexLeg= BM_LEG_STRENGTH_INDEX*Main.DesignVars.GlobalStrengthFactor;
    AnyVar SpecificMuscleTensionShoulderArm= BM_ARM_STRENGTH_INDEX*90; //N/cm^2
  };

  // By default there is an option to define a custom scaling law
  #include "<ANYBODY_PATH_BODY>\Scaling\ScalingCustom.any"

  Scaling={
   //Base scaling laws according to the configuration file

   #if BM_SCALING == CONST_SCALING_CUSTOM
     // include your custom scaling law, which needs an 'AnyMan.any' file
     #include "<BM_SCALING_MY_FILE>"
     // undefine BM_SCALING_ANTHRO_FILE if an 'AnyMan.any' file is not used
     #ifdef BM_SCALING_ANTHRO_FILE
      Scaling = { //This is the file which set the segments lengths
         AnyMessage anthrofile_message = {
           Message = "Undefine BM_SCALING_ANTHRO_FILE in case it will not be used by your custom scaling law!";
           TriggerPreProcess = On;
           Type = MSG_Message;
         };
        #include "<BM_SCALING_ANTHRO_FILE>"
      };
     #endif
   #endif

   //Base scaling laws according to the configuration file
   #if BM_SCALING == CONST_SCALING_STANDARD
     #include "<ANYBODY_PATH_BODY>\Scaling\ScalingStandard.any"
   #endif

   #if BM_SCALING == CONST_SCALING_UNIFORM
     #include "<ANYBODY_PATH_BODY>\Scaling\ScalingUniform.any"
     Scaling = { //This is the file which set the segments lenghts
       #include "<BM_SCALING_ANTHRO_FILE>"
     };
   #endif

   #if BM_SCALING == CONST_SCALING_LENGTHMASS
     #include "<ANYBODY_PATH_BODY>\Scaling\ScalingLengthMass.any"
     Scaling = { //This is the file which set the segments lenghts
       #include "<BM_SCALING_ANTHRO_FILE>"
     };
   #endif

   #if BM_SCALING == CONST_SCALING_LENGTHMASSFAT
     #include "<ANYBODY_PATH_BODY>\Scaling\ScalingLengthMassFat.any"
     Scaling = { //This is the file which set the segments lenghts
       #include "<BM_SCALING_ANTHRO_FILE>"
     };
   #endif

   #if BM_SCALING == CONST_SCALING_UNIFORM_EXTMEASUREMENTS
     #include "<ANYBODY_PATH_BODY>\Scaling\ScalingUniformExt.any"
     Scaling = { //This is the file which set the segments lenghts
       #include "<BM_SCALING_ANTHRO_FILE>"
     };
   #endif

   #if BM_SCALING == CONST_SCALING_LENGTHMASS_EXTMEASUREMENTS
     #include "<ANYBODY_PATH_BODY>\Scaling\ScalingLengthMassExt.any"
     Scaling = { //This is the file which set the segments lenghts
       #include "<BM_SCALING_ANTHRO_FILE>"
     };
   #endif

   #if BM_SCALING == CONST_SCALING_LENGTHMASSFAT_EXTMEASUREMENTS
     #include "<ANYBODY_PATH_BODY>\Scaling\ScalingLengthMassFatExt.any"
     Scaling = { //This is the file which set the segments lenghts
       #include "<BM_SCALING_ANTHRO_FILE>"
     };
   #endif
 };

 AnyFolder DefaultMannequinDrivers = {
   #include "<ANYBODY_PATH_BODY_GENERICBODYMODEL>\BodyModel.MannequinDrivers.any"
 };
};

#include "<ANYBODY_PATH_BODY_GENERICBODYMODEL>\BodyModel.undefine.any"
