BodyModelRef.Right.Leg = {
  // Create a folder with references to the necessary muscles.
  AnyFolder EvaluateJointStrengthMusRef = {
    #if RIGHT_LEG_TD_SIMPLE_MUSCLES | RIGHT_LEG_TD_MUS_3E
    AnyFolder &LegMuscles = .Mus;
      #if TRUNK_SIMPLE_MUSCLES
      AnyFolder &SpineMuscles = ...Trunk.MusclesSpineRight;
      #else
      AnyFolder &SpineMuscles = ...Trunk.JointMuscles;
      #endif
    #else
    AnyFolder &LegMuscles = .JointMuscles;
      #if TRUNK_SIMPLE_MUSCLES
      AnyFolder &SpineMuscles = ...Trunk.MusclesSpineRight;
      #else
      AnyFolder &SpineMuscles = ...Trunk.JointMuscles;
      #endif
     #endif
  };
};

Right = {

    AnyFolder Leg = {
      AnyFolder HipFlexion={

        // Change the following variables to adjust the joint strength study
        AnyVector RangeOfMotion = DesignVar({-20,90});
        AnyVar HipAbduction = DesignVar(0);
        AnyVar HipExternalRotation = DesignVar(0);
        AnyVar KneeFlexion = DesignVar(0);
        AnyVar AnklePlantarFlexion = DesignVar(0);
        AnyVar SubtalarEversion = DesignVar(0);
        /////////////////////////////////////////

        // The following should not be changed
        AnyFolder &SideBodyModelRef=...BodyModelRef.Right;
        AnyFolder &SideBodyInterfaceRef = ...BodyModelRef.Interface.Right;
        AnyInt nStep = 1;
        #include "EvaluateJointStrengthStudy.any"
        AnyString OutputFileName =  "JointStrength_LegTD_Right_HipFlexion.csv";
        Model.Drivers = {
            AnyKinEqSimpleDriver LegDriver= {
              AnyKinMeasure &ref = .LegMeasure;
              DriverPos = {...RangeOfMotion[0],...HipAbduction ,...HipExternalRotation ,...KneeFlexion, ...AnklePlantarFlexion ,...SubtalarEversion }*pi/180;
              AnyFloat Mask = {1,0,0,0,0,0};
              DriverVel = Mask*0; //{...RangeOfMotion[1]-...RangeOfMotion[0],0,0,0,0,0}*pi/180/...Study.tEnd;
              Reaction.Type = {Off,On,On,On, On, On};
            };
        };
      };
      AnyFolder HipExtension={

        // Change the following variables to adjust the joint strength study
        AnyVector RangeOfMotion = DesignVar({90,-20});
        AnyVar HipAbduction = DesignVar(0);
        AnyVar HipExternalRotation = DesignVar(0);
        AnyVar KneeFlexion = DesignVar(0);
        AnyVar AnklePlantarFlexion = DesignVar(0);
        AnyVar SubtalarEversion = DesignVar(0);
        /////////////////////////////////////////

        // The following should not be changed
        AnyFolder &SideBodyModelRef=...BodyModelRef.Right;
        AnyFolder &SideBodyInterfaceRef = ...BodyModelRef.Interface.Right;
        AnyInt nStep = 1;
        #include "EvaluateJointStrengthStudy.any"
        AnyString OutputFileName =  "JointStrength_LegTD_Right_HipExtension.csv";
        Model.Drivers = {
            AnyKinEqSimpleDriver LegDriver= {
              AnyKinMeasure &ref = .LegMeasure;
              DriverPos = {...RangeOfMotion[0],...HipAbduction ,...HipExternalRotation ,...KneeFlexion, ...AnklePlantarFlexion ,...SubtalarEversion }*pi/180;
              AnyFloat Mask = {1,0,0,0,0,0};
              DriverVel = Mask*0; //{...RangeOfMotion[1]-...RangeOfMotion[0],0,0,0,0,0}*pi/180/...Study.tEnd;
              Reaction.Type = {Off,On,On,On, On, On};
            };
        };
      };

      AnyFolder HipAbduction={

        // Change the following variables to adjust the joint strength study
        AnyVector RangeOfMotion = DesignVar({-30,50});
        AnyVar HipFlexion = DesignVar(0);
        AnyVar HipExternalRotation = DesignVar(0);
        AnyVar KneeFlexion = DesignVar(0);
        AnyVar AnklePlantarFlexion = DesignVar(0);
        AnyVar SubtalarEversion = DesignVar(0);
        /////////////////////////////////////////

        // The following should not be changed
        AnyFolder &SideBodyModelRef=...BodyModelRef.Right;
        AnyFolder &SideBodyInterfaceRef = ...BodyModelRef.Interface.Right;
        AnyInt nStep = 1;
        #include "EvaluateJointStrengthStudy.any"
        AnyString OutputFileName =  "JointStrength_LegTD_Right_HipAbduction.csv";
        Model.Drivers = {
            AnyKinEqSimpleDriver LegDriver= {
              AnyKinMeasure &ref = .LegMeasure;
              DriverPos = {...HipFlexion,...RangeOfMotion[0],...HipExternalRotation ,...KneeFlexion, ...AnklePlantarFlexion ,...SubtalarEversion }*pi/180;
              AnyFloat Mask = {0,1,0,0,0,0};
              DriverVel = Mask*0; //{0,...RangeOfMotion[1]-...RangeOfMotion[0],0,0,0,0}*pi/180/...Study.tEnd;
              Reaction.Type = {On,Off,On,On, On, On};
            };
        };
      };

      AnyFolder HipAdduction={

        // Change the following variables to adjust the joint strength study
        AnyVector RangeOfMotion = DesignVar({50,-30});
        AnyVar HipFlexion = DesignVar(0);
        AnyVar HipExternalRotation = DesignVar(0);
        AnyVar KneeFlexion = DesignVar(0);
        AnyVar AnklePlantarFlexion = DesignVar(0);
        AnyVar SubtalarEversion = DesignVar(0);
        /////////////////////////////////////////

        // The following should not be changed
        AnyFolder &SideBodyModelRef=...BodyModelRef.Right;
        AnyFolder &SideBodyInterfaceRef = ...BodyModelRef.Interface.Right;
        AnyInt nStep = 1;
        #include "EvaluateJointStrengthStudy.any"
        AnyString OutputFileName =  "JointStrength_LegTD_Right_HipAdduction.csv";
        Model.Drivers = {
            AnyKinEqSimpleDriver LegDriver= {
              AnyKinMeasure &ref = .LegMeasure;
              DriverPos = {...HipFlexion, ...RangeOfMotion[0],...HipExternalRotation ,...KneeFlexion, ...AnklePlantarFlexion ,...SubtalarEversion }*pi/180;
              AnyFloat Mask = {0,1,0,0,0,0};
              DriverVel = Mask*0; //{0,...RangeOfMotion[1]-...RangeOfMotion[0],0,0,0,0}*pi/180/...Study.tEnd;
              Reaction.Type = {On,Off,On,On, On, On};
            };
        };
      };

      AnyFolder HipExternalRotation ={

        // Change the following variables to adjust the joint strength study
        AnyVector RangeOfMotion = DesignVar({-40,40});
        AnyVar HipFlexion = DesignVar(0);
        AnyVar HipAbduction = DesignVar(0);
        AnyVar KneeFlexion = DesignVar(0);
        AnyVar AnklePlantarFlexion = DesignVar(0);
        AnyVar SubtalarEversion = DesignVar(0);
        /////////////////////////////////////////

        // The following should not be changed
        AnyFolder &SideBodyModelRef=...BodyModelRef.Right;
        AnyFolder &SideBodyInterfaceRef = ...BodyModelRef.Interface.Right;
        AnyInt nStep = 1;
        #include "EvaluateJointStrengthStudy.any"
        AnyString OutputFileName =  "JointStrength_LegTD_Right_HipExternalRotation.csv";
        Model.Drivers = {
          AnyKinEqSimpleDriver LegDriver= {
            AnyKinMeasure &ref = .LegMeasure;
            DriverPos = {...HipFlexion,...HipAbduction,...RangeOfMotion[0],...KneeFlexion, ...AnklePlantarFlexion ,...SubtalarEversion }*pi/180;
            AnyFloat Mask = {0,0,1,0,0,0};
            DriverVel = Mask*0; //{0,0,...RangeOfMotion[1]-...RangeOfMotion[0],0,0,0}*pi/180/...Study.tEnd;
              Reaction.Type = {On,On,Off,On, On, On};
            };
        };
      };

      AnyFolder HipInternalRotation ={

        // Change the following variables to adjust the joint strength study
        AnyVector RangeOfMotion = DesignVar({40,-40});
        AnyVar HipFlexion = DesignVar(0);
        AnyVar HipAbduction = DesignVar(0);
        AnyVar KneeFlexion = DesignVar(0);
        AnyVar AnklePlantarFlexion = DesignVar(0);
        AnyVar SubtalarEversion = DesignVar(0);
        /////////////////////////////////////////

        // The following should not be changed
        AnyFolder &SideBodyModelRef=...BodyModelRef.Right;
        AnyFolder &SideBodyInterfaceRef = ...BodyModelRef.Interface.Right;
        AnyInt nStep = 1;
        #include "EvaluateJointStrengthStudy.any"
        AnyString OutputFileName =  "JointStrength_LegTD_Right_HipInternalRotation.csv";
        Model.Drivers = {
          AnyKinEqSimpleDriver LegDriver= {
            AnyKinMeasure &ref = .LegMeasure;
            DriverPos = {...HipFlexion,...HipAbduction,...RangeOfMotion[0],...KneeFlexion, ...AnklePlantarFlexion ,...SubtalarEversion }*pi/180;
            AnyFloat Mask = {0,0,1,0,0,0};
            DriverVel = Mask*0; //{0,0,...RangeOfMotion[1]-...RangeOfMotion[0],0,0,0}*pi/180/...Study.tEnd;
              Reaction.Type = {On,On,Off,On, On, On};
            };
        };
      };

      AnyFolder KneeFlexion={

        // Change the following variables to adjust the joint strength study
        AnyVector RangeOfMotion = DesignVar({0,90});
        AnyVar HipFlexion = DesignVar(0);
        AnyVar HipAbduction = DesignVar(0);
        AnyVar HipExternalRotation = DesignVar(0);
        AnyVar AnklePlantarFlexion = DesignVar(0);
        AnyVar SubtalarEversion = DesignVar(0);
        /////////////////////////////////////////

        // The following should not be changed
        AnyFolder &SideBodyModelRef=...BodyModelRef.Right;
        AnyFolder &SideBodyInterfaceRef = ...BodyModelRef.Interface.Right;
        AnyInt nStep = 1;
        #include "EvaluateJointStrengthStudy.any"
        AnyString OutputFileName =  "JointStrength_LegTD_Right_KneeFlexion.csv";
        Model.Drivers = {
          AnyKinEqSimpleDriver LegDriver= {
            AnyKinMeasure &ref = .LegMeasure;
            DriverPos = {...HipFlexion,...HipAbduction ,...HipExternalRotation ,...RangeOfMotion[0], ...AnklePlantarFlexion ,...SubtalarEversion }*pi/180;
            AnyFloat Mask = {0,0,0,1,0,0};
            DriverVel = Mask*0; //{0,0,0,...RangeOfMotion[1]-...RangeOfMotion[0],0,0}*pi/180/...Study.tEnd;
              Reaction.Type = {On,On,On,Off, On, On};
            };
        };
      };

      AnyFolder KneeExtension={

        // Change the following variables to adjust the joint strength study
        AnyVector RangeOfMotion = DesignVar({90,0});
        AnyVar HipFlexion = DesignVar(0);
        AnyVar HipAbduction = DesignVar(0);
        AnyVar HipExternalRotation = DesignVar(0);
        AnyVar AnklePlantarFlexion = DesignVar(0);
        AnyVar SubtalarEversion = DesignVar(0);
        /////////////////////////////////////////

       // The following should not be changed
       AnyFolder &SideBodyModelRef=...BodyModelRef.Right;
       AnyFolder &SideBodyInterfaceRef = ...BodyModelRef.Interface.Right;
       AnyInt nStep = 1;
       #include "EvaluateJointStrengthStudy.any"
       AnyString OutputFileName =  "JointStrength_LegTD_Right_KneeExtension.csv";
       Model.Drivers = {
         AnyKinEqSimpleDriver LegDriver= {
           AnyKinMeasure &ref = .LegMeasure;
           DriverPos = {...HipFlexion,...HipAbduction ,...HipExternalRotation ,...RangeOfMotion[0], ...AnklePlantarFlexion ,...SubtalarEversion }*pi/180;
           AnyFloat Mask = {0,0,0,1,0,0};
           DriverVel = Mask*0; //{0,0,0,...RangeOfMotion[1]-...RangeOfMotion[0],0,0}*pi/180/...Study.tEnd;
             Reaction.Type = {On,On,On,Off, On, On};
           };
       };
     };


     AnyFolder AnklePlantarFlexion ={

       // Change the following variables to adjust the joint strength study
       AnyVector RangeOfMotion = DesignVar({30,-45});
       AnyVar HipFlexion = DesignVar(0);
       AnyVar HipAbduction = DesignVar(0);
       AnyVar HipExternalRotation = DesignVar(0);
       AnyVar KneeFlexion = DesignVar(0);
       AnyVar SubtalarEversion = DesignVar(0);
       /////////////////////////////////////////

       // The following should not be changed
       AnyFolder &SideBodyModelRef=...BodyModelRef.Right;
       AnyFolder &SideBodyInterfaceRef = ...BodyModelRef.Interface.Right;
       AnyInt nStep = 1;
       #include "EvaluateJointStrengthStudy.any"
       AnyString OutputFileName =  "JointStrength_LegTD_Right_AnklePlantarFlexion.csv";
       Model.Drivers = {
         AnyKinEqSimpleDriver LegDriver= {
           AnyKinMeasure &ref = .LegMeasure;
           DriverPos = {...HipFlexion,...HipAbduction ,...HipExternalRotation ,...KneeFlexion,...RangeOfMotion[0],...SubtalarEversion }*pi/180;
           AnyFloat Mask = {0,0,0,0,1,0};
           DriverVel = Mask*0;//{0,0,0,0,...RangeOfMotion[1]-...RangeOfMotion[0],0}*pi/180/...Study.tEnd;
            Reaction.Type = {On,On,On,On, Off, On};
           };
       };
     };
     AnyFolder AnkleDorsiFlexion ={

       // Change the following variables to adjust the joint strength study
       AnyVector RangeOfMotion = DesignVar({-45,30});
       AnyVar HipFlexion = DesignVar(0);
       AnyVar HipAbduction = DesignVar(0);
       AnyVar HipExternalRotation = DesignVar(0);
       AnyVar KneeFlexion = DesignVar(0);
       AnyVar SubtalarEversion = DesignVar(0);
       /////////////////////////////////////////

       // The following should not be changed
       AnyFolder &SideBodyModelRef=...BodyModelRef.Right;
       AnyFolder &SideBodyInterfaceRef = ...BodyModelRef.Interface.Right;
       AnyInt nStep = 1;
       #include "EvaluateJointStrengthStudy.any"
       AnyString OutputFileName =  "JointStrength_LegTD_Right_AnkleDorsiFlexion.csv";
       Model.Drivers = {
         AnyKinEqSimpleDriver LegDriver= {
           AnyKinMeasure &ref = .LegMeasure;
           DriverPos = {...HipFlexion,...HipAbduction ,...HipExternalRotation ,...KneeFlexion,...RangeOfMotion[0],...SubtalarEversion }*pi/180;
           AnyFloat Mask = {0,0,0,0,1,0};
           DriverVel = Mask*0; //{0,0,0,0,...RangeOfMotion[1]-...RangeOfMotion[0],0}*pi/180/...Study.tEnd;
           Reaction.Type = {On,On,On,On, Off, On};
           };
       };
     };

     AnyFolder SubTalarEversion ={

       // Change the following variables to adjust the joint strength study
       AnyVector RangeOfMotion = DesignVar({-30,30});
       AnyVar HipFlexion = DesignVar(0);
       AnyVar HipAbduction = DesignVar(0);
       AnyVar HipExternalRotation = DesignVar(0);
       AnyVar KneeFlexion = DesignVar(0);
       AnyVar AnklePlantarFlexion = DesignVar(0);
       /////////////////////////////////////////

       // The following should not be changed
       AnyFolder &SideBodyModelRef=...BodyModelRef.Right;
       AnyFolder &SideBodyInterfaceRef = ...BodyModelRef.Interface.Right;
       AnyInt nStep = 1;
       #include "EvaluateJointStrengthStudy.any"
       AnyString OutputFileName =  "JointStrength_LegTD_Right_SubTalarEversion.csv";
       Model.Drivers = {
         AnyKinEqSimpleDriver LegDriver= {
           AnyKinMeasure &ref = .LegMeasure;
           DriverPos = {...HipFlexion,...HipAbduction ,...HipExternalRotation ,...KneeFlexion,...AnklePlantarFlexion,...RangeOfMotion[0]}*pi/180;
           AnyFloat Mask = {0,0,0,0,0,1};
           DriverVel = Mask*0; //{0,0,0,0,0,...RangeOfMotion[1]-...RangeOfMotion[0]}*pi/180/...Study.tEnd;
             Reaction.Type = {On,On,On,On, On, Off};
           };
       };
     };

     AnyFolder SubTalarInversion ={

       // Change the following variables to adjust the joint strength study
       AnyVector RangeOfMotion = DesignVar({30,-30});
       AnyVar HipFlexion = DesignVar(0);
       AnyVar HipAbduction = DesignVar(0);
       AnyVar HipExternalRotation = DesignVar(0);
       AnyVar KneeFlexion = DesignVar(0);
       AnyVar AnklePlantarFlexion = DesignVar(0);
       /////////////////////////////////////////

       // The following should not be changed
       AnyFolder &SideBodyModelRef=...BodyModelRef.Right;
       AnyFolder &SideBodyInterfaceRef = ...BodyModelRef.Interface.Right;
       AnyInt nStep = 1;
       #include "EvaluateJointStrengthStudy.any"
       AnyString OutputFileName =  "JointStrength_LegTD_Right_SubTalarInversion.csv";
       Model.Drivers = {
         AnyKinEqSimpleDriver LegDriver= {
           AnyKinMeasure &ref = .LegMeasure;
           DriverPos = {...HipFlexion,...HipAbduction ,...HipExternalRotation ,...KneeFlexion,...AnklePlantarFlexion,...RangeOfMotion[0]}*pi/180;
           AnyFloat Mask = {0,0,0,0,0,1};
           DriverVel = Mask*0; //{0,0,0,0,0,...RangeOfMotion[1]-...RangeOfMotion[0]}*pi/180/...Study.tEnd;
             Reaction.Type = {On,On,On,On, On, Off};
           };
       };
     };

    };//Leg
   };//Right


  Run_all_studies ={
    AnyOperation &RHipFlexion= .Right.Leg.HipFlexion.MacroCmd;
    AnyOperation &RHipExtension= .Right.Leg.HipExtension.MacroCmd;
    AnyOperation &RHipAbduction= .Right.Leg.HipAbduction.MacroCmd;
    AnyOperation &RHipAdduction= .Right.Leg.HipAdduction.MacroCmd;
    AnyOperation &RHipExternalRotation = .Right.Leg.HipExternalRotation.MacroCmd;
    AnyOperation &RHipInternalRotation = .Right.Leg.HipInternalRotation.MacroCmd;
    AnyOperation &RKneeFlexion = .Right.Leg.KneeFlexion.MacroCmd;
    AnyOperation &RKneeExtension = .Right.Leg.KneeExtension.MacroCmd;
    AnyOperation &RAnklePlantarFlexion = .Right.Leg.AnklePlantarFlexion.MacroCmd;
    AnyOperation &RAnkleDorsiFlexion = .Right.Leg.AnkleDorsiFlexion.MacroCmd;
    AnyOperation &RSubTalarEversion= .Right.Leg.SubTalarEversion.MacroCmd;
    AnyOperation &RSubTalarInversion= .Right.Leg.SubTalarInversion.MacroCmd;
  };
