//This is the calibration4 file it will calibrate specfic muscles on the leg
AnyFolder HipAdductionCal={

  AnyFolder &Pelvis = ..HumanFolderRef.Trunk.SegmentsLumbar.PelvisSeg; //This is a reference to the folder which holds the human part of the model
  AnyFolder &LegSegSide = .SideHumanFolderRef.Leg.Seg; //This is a reference to the folder which holds the human part of the model
  AnyFolder &JointsCal2 = .SideHumanFolderRef.Leg.Jnt;
    AnyFolder &InterfaceRef = .SideHumanFolderRef.Leg.InterfaceFolder;

  AnyFixedRefFrame ground = {
    AnyRefNode node = {
      ARel=..Pelvis.Axes0;
      sRel=..Pelvis.r0;
    };
  };

  AnyRevoluteJoint PelvisGround={
    AnyRefFrame &Ground = .ground.node;
    AnySeg &Sacrum= ...HumanFolderRef.Trunk.SegmentsLumbar.PelvisSeg;

    Axis=z;
  };

  AnyKinEqSimpleDriver PelvisGroundRot = {
    AnyRevoluteJoint &Jnt = .PelvisGround;
    DriverPos = {0};
    DriverVel = {0};
    Reaction.Type = {Off};
  };

  //////////////////////////////////////////Hip Adduction calibration//////////////////////////////////////

//  AnyKinEqSimpleDriver Hip = {
//    AnySphericalJoint &Spherical = .JointsCal2.Hip;
//    MeasureOrganizer = {2,0,1}; // flexion/extension, abduction/adduction, internal/external rotation
//    DriverPos = {-60,0,..Sign*10}*pi/180;
//    DriverVel = {0,0,0}*pi/180;
//    Reaction.Type = {Off,Off,Off};
//  };

AnyKinEqInterPolDriver HipAbductionAdduction =  {
     AnyKinMeasureOrg &Hip1 = .InterfaceRef.HipAbduction;
    MeasureOrganizer = {0};
    Type = PiecewiseLinear;
    T = {0,1};
    Data = {{-30,40}}*pi/180;
    Reaction.Type = {Off};
   };

   AnyKinEqSimpleDriver HipFlexionExtension =
   {
     AnyKinMeasureOrg &Hip2 = .InterfaceRef.HipFlexion;
     MeasureOrganizer = {0};
     DriverPos = {0};
     DriverVel = {0};
     Reaction.Type = {Off};
     };

   AnyKinEqSimpleDriver HipInternalExternal =
   {
     AnyKinMeasureOrg &Hip3 = .InterfaceRef.HipExternalRotation;
     MeasureOrganizer = {0};
     DriverPos = {0};
     DriverVel = {0};
     Reaction.Type = {Off};
     };


  AnyKinEqSimpleDriver Knee = {
    AnyKinMeasureOrg &Hinge = .InterfaceRef.KneeFlexion;
    DriverPos = {0};
    DriverVel = {0*pi/180};
    Reaction.Type = {Off};
  };


  AnyKinEqSimpleDriver Ankle = {
    AnyKinMeasureOrg &Hinge = .InterfaceRef.AnklePlantarFlexion;
    DriverPos = {0}; // 10 degrees dorsi flexion
    DriverVel = {0*pi/180};
    Reaction.Type = {Off};
  };

  AnyKinEqSimpleDriver SubTalar = {
    AnyKinMeasureOrg &Hinge = .InterfaceRef.SubTalarEversion;
    DriverPos = {0};
    DriverVel = {0*pi/180};
    Reaction.Type = {Off};
  };
//


  //AnyFolder &MuscleParCal5 =.SideHumanFolderRef.Leg.MusPar;

  AnyFolder Mus = {
    //Muscle main function: knee extension
//    AnyShortestPathMuscle &VastusLateralisInferior1 = ..SideHumanFolderRef.Leg.Mus.VastusLateralisInferior1;
//    AnyShortestPathMuscle &VastusLateralisInferior2 = ..SideHumanFolderRef.Leg.Mus.VastusLateralisInferior2;
//    AnyShortestPathMuscle &VastusLateralisInferior3 = ..SideHumanFolderRef.Leg.Mus.VastusLateralisInferior3;
//    AnyShortestPathMuscle &VastusLateralisInferior4 = ..SideHumanFolderRef.Leg.Mus.VastusLateralisInferior4;
//    AnyShortestPathMuscle &VastusLateralisInferior5 = ..SideHumanFolderRef.Leg.Mus.VastusLateralisInferior5;
//    AnyShortestPathMuscle &VastusLateralisInferior6 = ..SideHumanFolderRef.Leg.Mus.VastusLateralisInferior6;
//    AnyShortestPathMuscle &VastusLateralisSuperior1 = ..SideHumanFolderRef.Leg.Mus.VastusLateralisSuperior1;
//    AnyShortestPathMuscle &VastusLateralisSuperior2 = ..SideHumanFolderRef.Leg.Mus.VastusLateralisSuperior2;
//    AnyShortestPathMuscle &VastusMedialisInferior1 =..SideHumanFolderRef.Leg.Mus.VastusMedialisInferior1;
//    AnyShortestPathMuscle &VastusMedialisInferior2 =..SideHumanFolderRef.Leg.Mus.VastusMedialisInferior2;
//    AnyShortestPathMuscle &VastusMedialisMid1 =..SideHumanFolderRef.Leg.Mus.VastusMedialisMid1;
//    AnyShortestPathMuscle &VastusMedialisMid2 =..SideHumanFolderRef.Leg.Mus.VastusMedialisMid2;
//    AnyShortestPathMuscle &VastusMedialisSuperior1 =..SideHumanFolderRef.Leg.Mus.VastusMedialisSuperior1;
//    AnyShortestPathMuscle &VastusMedialisSuperior2 =..SideHumanFolderRef.Leg.Mus.VastusMedialisSuperior2;
//    AnyShortestPathMuscle &VastusMedialisSuperior3 =..SideHumanFolderRef.Leg.Mus.VastusMedialisSuperior3;
//    AnyShortestPathMuscle &VastusMedialisSuperior4 =..SideHumanFolderRef.Leg.Mus.VastusMedialisSuperior4;
//    AnyShortestPathMuscle &VastusMedialisSuperior5 =..SideHumanFolderRef.Leg.Mus.VastusMedialisSuperior5;
//    AnyShortestPathMuscle &VastusMedialisSuperior6 =..SideHumanFolderRef.Leg.Mus.VastusMedialisSuperior6;
//    AnyShortestPathMuscle &VastusIntermedius1 = ..SideHumanFolderRef.Leg.Mus.VastusIntermedius1;
//    AnyShortestPathMuscle &VastusIntermedius2 = ..SideHumanFolderRef.Leg.Mus.VastusIntermedius2;
//    AnyShortestPathMuscle &VastusIntermedius3 = ..SideHumanFolderRef.Leg.Mus.VastusIntermedius3;
//    AnyShortestPathMuscle &VastusIntermedius4 = ..SideHumanFolderRef.Leg.Mus.VastusIntermedius4;
//    AnyShortestPathMuscle &VastusIntermedius5 = ..SideHumanFolderRef.Leg.Mus.VastusIntermedius5;
//    AnyShortestPathMuscle &VastusIntermedius6 = ..SideHumanFolderRef.Leg.Mus.VastusIntermedius6;
//
//    AnyViaPointMuscle &TensorFasciaeLatae1 = ..SideHumanFolderRef.Leg.Mus.TensorFasciaeLatae1;
//    AnyViaPointMuscle &TensorFasciaeLatae2 = ..SideHumanFolderRef.Leg.Mus.TensorFasciaeLatae2;
//    AnyShortestPathMuscle &RectusFemoris1 = ..SideHumanFolderRef.Leg.Mus.RectusFemoris1;
//    AnyShortestPathMuscle &RectusFemoris2 = ..SideHumanFolderRef.Leg.Mus.RectusFemoris2;
//
//
//    AnyViaPointMuscle &ObturatorExternusSuperior1 = ..SideHumanFolderRef.Leg.Mus.ObturatorExternusSuperior1;
//    AnyViaPointMuscle &ObturatorExternusSuperior2 = ..SideHumanFolderRef.Leg.Mus.ObturatorExternusSuperior2;
//    AnyViaPointMuscle &ObturatorExternusSuperior3 = ..SideHumanFolderRef.Leg.Mus.ObturatorExternusSuperior3;
//    AnyViaPointMuscle &ObturatorExternusInferior1 = ..SideHumanFolderRef.Leg.Mus.ObturatorExternusInferior1;
//    AnyViaPointMuscle &ObturatorExternusInferior2 = ..SideHumanFolderRef.Leg.Mus.ObturatorExternusInferior2;
//    AnyViaPointMuscle &ObturatorInternus1 = ..SideHumanFolderRef.Leg.Mus.ObturatorInternus1;
//    AnyViaPointMuscle &ObturatorInternus2 = ..SideHumanFolderRef.Leg.Mus.ObturatorInternus2;
//    AnyViaPointMuscle &ObturatorInternus3 = ..SideHumanFolderRef.Leg.Mus.ObturatorInternus3;
//
//        AnyViaPointMuscle &PeroneusBrevis1  = ..SideHumanFolderRef.Leg.Mus.PeroneusBrevis1;
//    AnyViaPointMuscle &PeroneusBrevis2  = ..SideHumanFolderRef.Leg.Mus.PeroneusBrevis2;
//    AnyViaPointMuscle &PeroneusBrevis3  = ..SideHumanFolderRef.Leg.Mus.PeroneusBrevis3;
//    AnyViaPointMuscle &PeroneusLongus1  = ..SideHumanFolderRef.Leg.Mus.PeroneusLongus1;
//    AnyViaPointMuscle &PeroneusLongus2  = ..SideHumanFolderRef.Leg.Mus.PeroneusLongus2;
//    AnyViaPointMuscle &PeroneusLongus3  = ..SideHumanFolderRef.Leg.Mus.PeroneusLongus3;
//
    AnyFolder &mus113  = ..SideHumanFolderRef.Leg.Mus.AdductorLongus1;
    AnyFolder &mus114  = ..SideHumanFolderRef.Leg.Mus.AdductorLongus2;
    AnyFolder &mus115  = ..SideHumanFolderRef.Leg.Mus.AdductorLongus3;
    AnyFolder &mus116  = ..SideHumanFolderRef.Leg.Mus.AdductorLongus4;
    AnyFolder &mus117  = ..SideHumanFolderRef.Leg.Mus.AdductorLongus5;
    AnyFolder &mus118  = ..SideHumanFolderRef.Leg.Mus.AdductorLongus6;
    AnyFolder &mus119  = ..SideHumanFolderRef.Leg.Mus.AdductorMagnusDistal1;
    AnyFolder &mus120  = ..SideHumanFolderRef.Leg.Mus.AdductorMagnusDistal2;
    AnyFolder &mus121  = ..SideHumanFolderRef.Leg.Mus.AdductorMagnusDistal3;
    AnyFolder &mus122  = ..SideHumanFolderRef.Leg.Mus.AdductorMagnusMid1;
    AnyFolder &mus123  = ..SideHumanFolderRef.Leg.Mus.AdductorMagnusMid2;
    AnyFolder &mus124  = ..SideHumanFolderRef.Leg.Mus.AdductorMagnusMid3;
    AnyFolder &mus125  = ..SideHumanFolderRef.Leg.Mus.AdductorMagnusMid4;
    AnyFolder &mus126  = ..SideHumanFolderRef.Leg.Mus.AdductorMagnusMid5;
    AnyFolder &mus127  = ..SideHumanFolderRef.Leg.Mus.AdductorMagnusMid6;
    AnyFolder &mus128  = ..SideHumanFolderRef.Leg.Mus.AdductorMagnusProximal1;
    AnyFolder &mus129  = ..SideHumanFolderRef.Leg.Mus.AdductorMagnusProximal2;
    AnyFolder &mus130  = ..SideHumanFolderRef.Leg.Mus.AdductorMagnusProximal3;
    AnyFolder &mus131  = ..SideHumanFolderRef.Leg.Mus.AdductorMagnusProximal4;
    AnyFolder &mus132  = ..SideHumanFolderRef.Leg.Mus.AdductorBrevisProximal1;
    AnyFolder &mus133  = ..SideHumanFolderRef.Leg.Mus.AdductorBrevisProximal2;
//    AnyFolder &mus134  = ..SideHumanFolderRef.Leg.Mus.AdductorBrevisMid3;
//    AnyFolder &mus135  = ..SideHumanFolderRef.Leg.Mus.AdductorBrevisMid4;
//    AnyFolder &mus136  = ..SideHumanFolderRef.Leg.Mus.AdductorBrevisDistal5;
//    AnyFolder &mus137  = ..SideHumanFolderRef.Leg.Mus.AdductorBrevisDistal6;
    AnyFolder &mus148  = ..SideHumanFolderRef.Leg.Mus.Pectineus1;
    AnyFolder &mus149  = ..SideHumanFolderRef.Leg.Mus.Pectineus2;
    AnyFolder &mus150  = ..SideHumanFolderRef.Leg.Mus.Pectineus3;
    AnyFolder &mus151  = ..SideHumanFolderRef.Leg.Mus.Pectineus4;

//    AnyMuscle &GluteusMaximusInferior1 =  ..SideHumanFolderRef.Leg.Mus.GluteusMaximusInferior1;
//    AnyMuscle &GluteusMaximusInferior2 =  ..SideHumanFolderRef.Leg.Mus.GluteusMaximusInferior2;
//    AnyMuscle &GluteusMaximusInferior3 =  ..SideHumanFolderRef.Leg.Mus.GluteusMaximusInferior3;
//    AnyMuscle &GluteusMaximusInferior4 =  ..SideHumanFolderRef.Leg.Mus.GluteusMaximusInferior4;
//    AnyMuscle &GluteusMaximusInferior5 =  ..SideHumanFolderRef.Leg.Mus.GluteusMaximusInferior5;
//    AnyMuscle &GluteusMaximusInferior6 =  ..SideHumanFolderRef.Leg.Mus.GluteusMaximusInferior6;
  };

};


// The study: Operations to be performed on the model
AnyBodyCalibrationStudy LegCalibrationStudy4 = {
  AnyFolder &ref=.HipAdductionCal;
 nStep = 2;
//  tStart = 0;
//  tEnd = 3;
   InitialConditions.SolverType = KinSolOverDeterminate;
    RmaxMuscleFiber = {1.2,1.2,1.2,1.2,1.2,1.2,1.2,1.2,1.2,1.2,1.2,1.2,1.2,1.2,1.2,1.2,1.2,1.2,1.2,1.2,1.2,1.2,1.2,1.2,1.2,1.2,1.2,1.2,1.2,1.2,1.2};
    RminMuscleFiber = {0.5,0.5,0.5,0.5,0.5,0.5,0.5,0.5,0.5,0.5,0.5,0.5,0.5,0.5,0.5,0.5,0.5,0.5,0.5,0.5,0.5,0.5,0.5,0.5,0.5,0.5,0.5,0.5,0.5,0.5,0.5};

};
