AnyFolder Model = {
  // Model parts included in the moment arm study
  AnyFolder &PelvisRef = ......BodyModelRef.Trunk.SegmentsLumbar.PelvisSeg; //This is a reference to the folder which holds the human part of the model
  AnyFolder &LegSegSideRef = .SideBodyModelRef.Leg.Seg; //This is a reference to the folder which holds the human part of the model
  AnyFolder &LegJntsRef =  .SideBodyModelRef.Leg.Jnt;
  AnyFolder &MusRef = .SideBodyModelRef.Leg.Mus;
//  AnyFolder &LegMusRef = .SideBodyModelRef.Leg.Mus;
//  AnyFolder &SpineMusRef = .SideTrunkMusRef;

 AnyFixedRefFrame ground = {
   AnyRefNode node = {
      ARel=..PelvisRef.Axes0;
     sRel=..PelvisRef.r0;
   };
 };


AnyFolder Drivers = {
   AnyVar AngularVelocity = (..RangeOfMotion[1]-..RangeOfMotion[0])*pi/180;

 AnyKinMeasureOrg LegMeasure = {
  AnyKinMeasure &HipFlexion= ...SideBodyInterfaceRef.HipFlexion;
  AnyKinMeasure &HipAbduction= ...SideBodyInterfaceRef.HipAbduction;
  AnyKinMeasure &HipExternalRotation= ...SideBodyInterfaceRef.HipExternalRotation;
  AnyKinMeasure &KneeFlexion= ...SideBodyInterfaceRef.KneeFlexion;
  AnyKinMeasure &AnklePlantarFlexion= ...SideBodyInterfaceRef.AnklePlantarFlexion;
  AnyKinMeasure &SubTalarEversion= ...SideBodyInterfaceRef.SubTalarEversion;
 };

 AnyStdJoint PelvisGround={
    AnyRefFrame &Ground = ..ground.node;
    AnyRefFrame &Sacrum= ..PelvisRef;
 };

};// Drivers
  AnyForce JointLoad = {
      AnyKinMeasure &ref = .Drivers.LegMeasure;
      AnyInt Sign = -round(.Drivers.AngularVelocity/abs(.Drivers.AngularVelocity));
      F = 50*Sign*not(not(.Drivers.LegDriver.DriverVel));
  };

};


AnyBodyStudy Study = {


  #ifdef NO_GRAVITY
  Gravity = {0,0,0};
  #else
  Gravity = {0,-9.81,0};
  #endif
  tStart = 0;
  tEnd = .ROM/(.RangeOfVelocity);
  nStep = .nStep;
  InitialConditions.SolverType = KinSolDeterminate;
  Kinematics.SolverType = KinSolDeterminate;
  Kinematics.PosAnalysisOnlyOnOff = Off;
  InitialConditions.PosAnalysisOnlyOnOff = On;

  InverseDynamics.Criterion.Type = MR_MinMaxStrict;

//  AnyString Name = strval(Main.Studies.EvaluateKneeStrength.Right.ConcentricStrength.KneeFlexion.RangeOfVelocity);
//  AnyOutputFile KneeFlexorStrengthConcentric =
//  {
//    FileName = .Name+"KneeFlexorStrengthConcentric.txt";
//    AnyVector Strength = .JointStrength.Demo;
//  };

  AnyOutputFun JointStrengthOutput =
    {
      Val = .JointStrength.JointStrength;

    };

  AnyFolder &Model = .Model;

  AnyFolder JointStrength = {

    AnyString number = strval(Main.Studies.EvaluateKneeStrength.Right.ConcentricStrength.KneeFlexion.RangeOfVelocity);
//    AnyOutputFile Outputfile = {
//      FileName = .number+ "KneeFlexorConcentricStrength.txt";
//      SepSign = " ";
//      AnyFloat StrengthFloat = Main.Studies.EvaluateKneeStrength.Right.ConcentricStrength.KneeFlexion.Study.JointStrength.JointStrengthVec[3];
//    };

     AnyFolder Abscissa  ={
        AnyVar JointAngle = not(not(..Model.Drivers.LegDriver.DriverVel))*..Model.Drivers.LegMeasure.Pos'*180/pi;
     };
     AnyVar JointStrength = max(abs(.Model.JointLoad.F))/(.MaxMuscleActivity+0.00000001);
     AnyVector JointStrengthVec = abs(.Model.JointLoad.F)/(.MaxMuscleActivity+0.00000001);
     AnyVector Demo = abs(.Model.JointLoad.F)/(.MaxMuscleActivity+0.00000001);

     //     AnyVector DemoDemo = .Demos2;
     //AnyVar PsoasMajorT12I = -1*.Model.SpineMusRef.PsoasMajor.PMT12I_TM.LmtDot/.Model.Drivers.AngularVelocity;
  };
};


AnyOperationMacro MacroCmd =
{

  MacroStr = {"operation " + CompleteNameOf(&.Study.InverseDynamics),
    "run"
#ifdef OUTPUT_SAVE_PATH
    ,
    "classoperation " + CompleteNameOf(&.Study.Output) + strquote("Save data")
     + " --type=" + strquote("Deep") +" --file=" + strquote(
     OUTPUT_SAVE_PATH + .OutputFileName + ".anydata.h5")
#endif
   };
 };
