#include "../libdef.any"

//This is a list of the classes used for defining the model
//Class used for defining a marker
#include "<ANYBODY_PATH_TOOLBOX>/Mocap/CreateMarkerClass.any"
//Class used for defining a marker
//#include "<ANYBODY_PATH_TOOLBOX>/Mocap/CreateMarkerClassTD.any"
#include "<ANYBODY_PATH_TOOLBOX>/Mocap/CreateMarkerClassTDWidgetV2.any"
//Class used to construct a forceplate of type4
#include "<ANYBODY_PATH_TOOLBOX>/Mocap/ForcePlateType2AutoDetection.any"
#include "<ANYBODY_PATH_TOOLBOX>/Mocap/ForcePlateType2.any"
#include "<ANYBODY_PATH_TOOLBOX>/Mocap/ForcePlateType3AutoDetection.any"
#include "<ANYBODY_PATH_TOOLBOX>/Mocap/ForcePlateType3.any"
#include "<ANYBODY_PATH_TOOLBOX>/Mocap/ForcePlateType4AutoDetection.any"
#include "<ANYBODY_PATH_TOOLBOX>/Mocap/ForcePlateType4.any"

//Class used for defining a which antrhopometics measurements will be part of the analysis
#include "<ANYBODY_PATH_TOOLBOX>/Mocap/OptimizeAnthropometricsOnOffV2.any"


#define MotionAndParameterOptimizationModel 1
#define InverseDynamicModel 0
#define HumanModelPresent 1
#define MarkersPresent 1
#define MotionAndParamOptimization
#define IntialPositionStudy 0


Main ={

  #include "WidgetValues.any"

  Main.ModelSetup.C3DFileData ={
    ConstructModelOnOff = Off; //If this is set to on it will display the markers but slow down the analysis a lot....
    ConstructChartOnOff=Off;
  };
  #include "project.any"
  #include "<SubjectPath>/SubjectSpecificData.any"
  #include "<DataPath>/TrialSpecificData.any"
  #include "<DataPath>/ModelSetup.any"

  //PLASE MAKE SURE THAT IF YOU PRESS File->Open YOU ARE IN THE DIRECTRORY OF THIS APPLICATION. If this is not the case go to this directory and open a file,
  //otherwise the automatic procedure may not work
  // Run this sequence of analysis by selecting it in the operation tree
  AnyOperationMacro RunMotionAndParameterOptimizationSequence  = {
    MacroStr=({
      "classoperation Main" + strformat("\x22")+ "Update Values" + strformat("\x22"),
      "operation Main.Studies.ParameterIdentification.ParameterOptimization",
      "run",
      "classoperation Main.Studies.ParameterIdentification" + " " + strquote("Save design") + " --file=" + strquote(FilePathCompleteOf(Main.ModelSetup.FileNames.OptimizedParameters )),
      "operation Main.Studies.MotionOptimization.Kinematics",
      "run"
    });

  };


  AnyOperationMacro SaveWidgetValues = {
    MacroStr={
      "classoperation Main" + " " + strquote("Save Values") + " --file=" + strquote(FilePathCompleteOf(Main.ModelSetup.FileNames.WidgetValues ))
    };
  };

  AnyOperationMacro LoadWidgetValues = {
    MacroStr={
      "classoperation Main" + " " + strquote("Load Values") + " --file=" + strquote(FilePathCompleteOf(Main.ModelSetup.FileNames.WidgetValues ))
    };
  };


  AnyOperationMacro SaveResults = {
    MacroStr={
      "classoperation Main.Studies.MotionOptimization.Output" + " " + strquote("Save data") + " --file=" + strquote(FilePathCompleteOf(Main.ModelSetup.FileNames.KinResults )) + " --type=Deep"
    };
  };


  AnyOperationMacro LoadResults = {
    MacroStr={
      "classoperation Main.Studies.ParameterIdentification" + " " + strquote("Load design") + " --file=" + strquote(FilePathCompleteOf(Main.ModelSetup.FileNames.OptimizedParameters )),
      "classoperation Main" + strformat("\x22")+ "Update Values" + strformat("\x22"),
      "classoperation Main.Studies.MotionOptimization.Output" + " " + strquote("Load data") + " --file=" + strquote(FilePathCompleteOf(Main.ModelSetup.FileNames.KinResults ))

    };
  };


    Main.Project.Files.MainFile="MotionAndParamOptimization.Main.any";


    Main.Project ={
      Files = {
        SetValueFile =    FilePathCompleteOf(Main.ModelSetup.FileNames.WidgetValues);
      };

    };

    Main.Project.Tasks={
      AnyFile marker= "Markers.any";


      Motion_And_Param_Opt_Model.SaveWidgetValues = {
        Description = {
          Title = "Save Widget values";
          BodyText = "Executing this task will save widget values to file named:" + FilePathCompleteOf(Main.ModelSetup.FileNames.WidgetValues) +"<br/>"+
          "This file contains all results and can be used saving graphical manipulations.";
          Tooltip = Title;
        };
        Operation = &Main.SaveWidgetValues ;

      };

      Motion_And_Param_Opt_Model.LoadWidgetValues = {
        Description = {
          Title = "Load all reuslts Task";
          BodyText = "Executing this task will load all widge values from the file:" + FilePathCompleteOf(Main.ModelSetup.FileNames.WidgetValues) +"<br/>"+
          "Please note that the name of the file is specified here " + AnyScriptLinkOf(&Main.TrialSpecificData.NameOfFile,"NameOfFile") +"<br/>"+
          "To load another file this name should be changed.<br/>" +
          "<br/>"+
          "Note that the ModelView is not updated until a kinematic operation has been executed.";
          Tooltip = Title;
        };
        Operation = &Main.LoadWidgetValues ;
      };

      Motion_And_Param_Opt_Model.Run_First_Timestep = {
        Description = {
          Title = "Run first time step";

          BodyText =
          "Running this task will attempt to run the first time step of the kinematic analysis.";
          Tooltip = Title;
        };
        Operation = &Main.Studies.KinematicStudyForParameterIdentification.InitialConditions ;

      };


      Motion_And_Param_Opt_Model.Motion_and_Param_Optimization= {
        Description = {
          Title = "<h4>Modify ModelSetup file Task</h4>";

          BodyText =
          "This task can be used to do the following adjustments to the model:<br/>" +
          strformat ("\t")+"1.) Set the optimization settings for bones<br/>"+
          strformat ("\t")+"2.) Definition of markers and optimization settings <br/>"+
          strformat ("\t")+"3.) Adjust the marker positions by dragging coordinate system in nodes<br/>"+
          strformat ("\t")+"4.) Run the motion and optimization task<br/>"+
          "It is only needed to modify this file if your experimental protocol is different from the one used in present ModelSetup.any file."+
          "The same ModelSetup.any can be used for multiple trials using same experimental setup. <br/>" +
          "<br/>" +
          "<h4> 1.) Optimization settings for bones<br/></h4>"+
          "For each bone evaluate if it should be allowed for the optimized to change its length"  + AnyScriptLinkOf(&Main.ModelSetup.OptimizeOnOff," here") +".<br/>" +
          "Please note that depending on your marker configuration it may not be possible to have all bones lengths active in the optimization"+
          "<h4> 2.) Definition of markers and optimization settings </h4>"+
          "If you marker protocol is not similar to the one used in the ModelSetup.any file modify the "+ AnyScriptLinkOf(&Main.ModelSetup.MarkerLinkDummy," markers") + " to correspond with your protocol.<br/>"+
          "Please note that the names of the markers need to be the same as found in the C3D file being" +AnyBodyLinkOf(&Main.ModelSetup.C3DFileData.Points.Markers," used")+ "<br/>"+
          "Each defined markers driver introduces two spheres in the ModelView a red sphere which shows the marker position on the human model and a "+
          "blue one which shows the recorded free floating marker position. The green and red arrow indicates if the marker is free to be optimized by the "+
          "optimization sequence <br/>"+
          "<h4> 3.) Adjust the marker positions by dragging coordinate system in red sphere </h4><br/>"+
          "Once the markers has been defined their position can be adjusted by dragging their coordinate system in the ModelView"+
          "The manipulated marker postions will automatically be used as part of the starting guess for the optimization. They will also be automatically "+
          "be saved evertime the Load_Motion_And_Param_Opt_Model is being loaded. When this model loads the user will be asked if the values saved in" +
          " the file should be used. Answering yes will read in previously adjusted marker positions. <br/>"+
          "<h4> 4.) Run the motion and optimization task </h4> <br/>" +
          "This will automatically execute a sequence of studies which optimize both motion and scale the models. <br/> " +
          "The output from this sequence of operations is a set of files containing joint angles and model scaling parameters <br/>" +
          "These files are automatically saved into file names containing the name of the C3D file as part of the name.<br/>" ;


          Tooltip = "Sets Initial Conditions";
          Files = {"MotionAndParamOptimization.Main.any"};


//          AnyFile filename = "Motion_and_Param_Optimization.htm";
//          HTMLURL = "file:///"+FilePathCompleteOf(filename)+"?count=25&prefix=Main.ModelSetup.Macros"
//          +"&0n="+NameOf(&Main.ModelSetup.RTHI)
//          +"&0v={"+strval(Main.ModelSetup.RTHI.sRelOptEdit[0],"%5g")+", "+strval(Main.ModelSetup.RTHI.sRelOptEdit[1],"%5g")+", "+strval(Main.ModelSetup.RTHI.sRelOptEdit[2],"%5g")+"}"
//          +"&1n="+NameOf(&Main.ModelSetup.RKNE)
//          +"&1v={"+strval(Main.ModelSetup.RKNE.sRelOptEdit[0],"%5g")+", "+strval(Main.ModelSetup.RKNE.sRelOptEdit[1],"%5g")+", "+strval(Main.ModelSetup.RKNE.sRelOptEdit[2],"%5g")+"}"
//          +"&2n="+NameOf(&Main.ModelSetup.LKNE)
//          +"&2v={"+strval(Main.ModelSetup.LKNE.sRelOptEdit[0],"%5g")+", "+strval(Main.ModelSetup.LKNE.sRelOptEdit[1],"%5g")+", "+strval(Main.ModelSetup.LKNE.sRelOptEdit[2],"%5g")+"}"
//          +"&3n="+NameOf(&Main.ModelSetup.LPSI)
//          +"&3v={"+strval(Main.ModelSetup.LPSI.sRelOptEdit[0],"%5g")+", "+strval(Main.ModelSetup.LPSI.sRelOptEdit[1],"%5g")+", "+strval(Main.ModelSetup.LPSI.sRelOptEdit[2],"%5g")+"}"
//          +"&4n="+NameOf(&Main.ModelSetup.RASI)
//          +"&4v={"+strval(Main.ModelSetup.RASI.sRelOptEdit[0],"%5g")+", "+strval(Main.ModelSetup.RASI.sRelOptEdit[1],"%5g")+", "+strval(Main.ModelSetup.RASI.sRelOptEdit[2],"%5g")+"}"
//          +"&5n="+NameOf(&Main.ModelSetup.RTIB)
//          +"&5v={"+strval(Main.ModelSetup.RTIB.sRelOptEdit[0],"%5g")+", "+strval(Main.ModelSetup.RTIB.sRelOptEdit[1],"%5g")+", "+strval(Main.ModelSetup.RTIB.sRelOptEdit[2],"%5g")+"}"
//          +"&6n="+NameOf(&Main.ModelSetup.RANK)
//          +"&6v={"+strval(Main.ModelSetup.RANK.sRelOptEdit[0],"%5g")+", "+strval(Main.ModelSetup.RANK.sRelOptEdit[1],"%5g")+", "+strval(Main.ModelSetup.RANK.sRelOptEdit[2],"%5g")+"}"
//          +"&7n="+NameOf(&Main.ModelSetup.LTIB)
//          +"&7v={"+strval(Main.ModelSetup.LTIB.sRelOptEdit[0],"%5g")+", "+strval(Main.ModelSetup.LTIB.sRelOptEdit[1],"%5g")+", "+strval(Main.ModelSetup.LTIB.sRelOptEdit[2],"%5g")+"}"
//          +"&8n="+NameOf(&Main.ModelSetup.LANK)
//          +"&8v={"+strval(Main.ModelSetup.LANK.sRelOptEdit[0],"%5g")+", "+strval(Main.ModelSetup.LANK.sRelOptEdit[1],"%5g")+", "+strval(Main.ModelSetup.LANK.sRelOptEdit[2],"%5g")+"}"
//          +"&9n="+NameOf(&Main.ModelSetup.RHEE)
//          +"&9v={"+strval(Main.ModelSetup.RHEE.sRelOptEdit[0],"%5g")+", "+strval(Main.ModelSetup.RHEE.sRelOptEdit[1],"%5g")+", "+strval(Main.ModelSetup.RHEE.sRelOptEdit[2],"%5g")+"}"
//          +"&10n="+NameOf(&Main.ModelSetup.LHEE)
//          +"&10v={"+strval(Main.ModelSetup.LHEE.sRelOptEdit[0],"%5g")+", "+strval(Main.ModelSetup.LHEE.sRelOptEdit[1],"%5g")+", "+strval(Main.ModelSetup.LHEE.sRelOptEdit[2],"%5g")+"}"
//          +"&11n="+NameOf(&Main.ModelSetup.RPSI)
//          +"&11v={"+strval(Main.ModelSetup.RPSI.sRelOptEdit[0],"%5g")+", "+strval(Main.ModelSetup.RPSI.sRelOptEdit[1],"%5g")+", "+strval(Main.ModelSetup.RPSI.sRelOptEdit[2],"%5g")+"}"
//          +"&12n="+NameOf(&Main.ModelSetup.RTOE)
//          +"&12v={"+strval(Main.ModelSetup.RTOE.sRelOptEdit[0],"%5g")+", "+strval(Main.ModelSetup.RTOE.sRelOptEdit[1],"%5g")+", "+strval(Main.ModelSetup.RTOE.sRelOptEdit[2],"%5g")+"}"
//          +"&13n="+NameOf(&Main.ModelSetup.LTOE)
//          +"&13v={"+strval(Main.ModelSetup.LTOE.sRelOptEdit[0],"%5g")+", "+strval(Main.ModelSetup.LTOE.sRelOptEdit[1],"%5g")+", "+strval(Main.ModelSetup.LTOE.sRelOptEdit[2],"%5g")+"}"
//          +"&14n="+NameOf(&Main.ModelSetup.LMT5)
//          +"&14v={"+strval(Main.ModelSetup.LMT5.sRelOptEdit[0],"%5g")+", "+strval(Main.ModelSetup.LMT5.sRelOptEdit[1],"%5g")+", "+strval(Main.ModelSetup.LMT5.sRelOptEdit[2],"%5g")+"}"
//          +"&15n="+NameOf(&Main.ModelSetup.RMT5)
//          +"&15v={"+strval(Main.ModelSetup.RMT5.sRelOptEdit[0],"%5g")+", "+strval(Main.ModelSetup.RMT5.sRelOptEdit[1],"%5g")+", "+strval(Main.ModelSetup.RMT5.sRelOptEdit[2],"%5g")+"}"
//          +"&16n="+NameOf(&Main.ModelSetup.LASI)
//          +"&16v={"+strval(Main.ModelSetup.LASI.sRelOptEdit[0],"%5g")+", "+strval(Main.ModelSetup.LASI.sRelOptEdit[1],"%5g")+", "+strval(Main.ModelSetup.LASI.sRelOptEdit[2],"%5g")+"}"
//          +"&17n="+NameOf(&Main.ModelSetup.LTHI)
//          +"&17v={"+strval(Main.ModelSetup.LTHI.sRelOptEdit[0],"%5g")+", "+strval(Main.ModelSetup.LTHI.sRelOptEdit[1],"%5g")+", "+strval(Main.ModelSetup.LTHI.sRelOptEdit[2],"%5g")+"}"
//          +"&18n="+NameOf(&Main.ModelSetup.RFHD)
//          +"&18v={"+strval(Main.ModelSetup.RFHD.sRelOptEdit[0],"%5g")+", "+strval(Main.ModelSetup.RFHD.sRelOptEdit[1],"%5g")+", "+strval(Main.ModelSetup.RFHD.sRelOptEdit[2],"%5g")+"}"
//          +"&19n="+NameOf(&Main.ModelSetup.LFHD)
//          +"&19v={"+strval(Main.ModelSetup.LFHD.sRelOptEdit[0],"%5g")+", "+strval(Main.ModelSetup.LFHD.sRelOptEdit[1],"%5g")+", "+strval(Main.ModelSetup.LFHD.sRelOptEdit[2],"%5g")+"}"
//          +"&20n="+NameOf(&Main.ModelSetup.RBHD)
//          +"&20v={"+strval(Main.ModelSetup.RBHD.sRelOptEdit[0],"%5g")+", "+strval(Main.ModelSetup.RBHD.sRelOptEdit[1],"%5g")+", "+strval(Main.ModelSetup.RBHD.sRelOptEdit[2],"%5g")+"}"
//          +"&21n="+NameOf(&Main.ModelSetup.LBHD)
//          +"&21v={"+strval(Main.ModelSetup.LBHD.sRelOptEdit[0],"%5g")+", "+strval(Main.ModelSetup.LBHD.sRelOptEdit[1],"%5g")+", "+strval(Main.ModelSetup.LBHD.sRelOptEdit[2],"%5g")+"}"
//          +"&22n="+NameOf(&Main.ModelSetup.T10)
//          +"&22v={"+strval(Main.ModelSetup.T10.sRelOptEdit[0],"%5g")+", "+strval(Main.ModelSetup.T10.sRelOptEdit[1],"%5g")+", "+strval(Main.ModelSetup.T10.sRelOptEdit[2],"%5g")+"}"
//          +"&23n="+NameOf(&Main.ModelSetup.STRN)
//          +"&23v={"+strval(Main.ModelSetup.STRN.sRelOptEdit[0],"%5g")+", "+strval(Main.ModelSetup.STRN.sRelOptEdit[1],"%5g")+", "+strval(Main.ModelSetup.STRN.sRelOptEdit[2],"%5g")+"}"
//          +"&24n="+NameOf(&Main.ModelSetup.CLAV)
//          +"&24v={"+strval(Main.ModelSetup.CLAV.sRelOptEdit[0],"%5g")+", "+strval(Main.ModelSetup.CLAV.sRelOptEdit[1],"%5g")+", "+strval(Main.ModelSetup.CLAV.sRelOptEdit[2],"%5g")+"}";
        };

        Operation =  &Main.RunMotionAndParameterOptimizationSequence ;

      };


      Motion_And_Param_Opt_Model.SaveResults = {
        Description = {
          Title = "Save all results Task";
          BodyText = "Executing this task will save all output from the inverse dynamics model to a file named :"+ FilePathCompleteOf(Main.ModelSetup.FileNames.KinResults) +"<br/>"+
          "This file contains all results and can be used for replaying analysis";
          Tooltip = Title;
        };
        Operation = &Main.SaveResults ;

      };

      Motion_And_Param_Opt_Model.LoadResults = {
        Description = {
          Title = "Load all results Task";
          BodyText = "Executing this task will load all output from the file :"+ FilePathCompleteOf(Main.ModelSetup.FileNames.KinResults) +"<br/>"+
          "This file contains all results and can be used for replaying analysis <br/>" +
          "Please note that the name of the file is specified here " + AnyScriptLinkOf(&Main.TrialSpecificData.NameOfFile,"NameOfFile") +"<br/>"+
          "To load another file this name should be changed.";
          Tooltip = Title;
        };
        Operation = &Main.LoadResults ;

      };


      Motion_And_Param_Opt_Model.Replay= {
        Description = {
          Title = "Replay the motion";

          BodyText =
          "This task can be used to do replay the optimized motion";


          Tooltip = "Replay motion";
        };

        Operation =  &Main.Studies.MotionOptimization.Replay ;

      };

    };

  Studies ={

    HumanModel={
      AnyFolder &Mannequin=.KinematicStudyForParameterIdentification.Mannequin;
      #include  "BodyPartsSetupKin.any"
    };


    #include "HumanModel.any"


    AnyBodyStudy KinematicStudyForParameterIdentification = {
            AnyFolder &UpdateHTMLURL = Main.Project.Tasks.Motion_And_Param_Opt_Model.Description;

      AnyFolder &C3DData=..ModelSetup.C3DFileData ;

      AnyFolder &BodyModel=.HumanModel.BodyModel;


      //This mannequin calculates a guess on the initial pelvis position based on ASIS and PSI markers
      //if these markers do not exist in the markerset used this has to be changed
      #include "Mannequin.any"  // this file controls the initial position of the model and he posture

      //Environment around the human
      AnyFolder EnvironmentModel ={
        //Model of the floor and force plates this is where the force plates are defined
        AnyFolder &BodyModelRef=.BodyModel;
        //This environment file makes use of automatic detection of which foot are incontact with which plate
        #include "<DataPath>/EnvironmentAutoDetection.any"
        //This environment file has no automatic detecteion of which foot are incontact with which plate it has to be set manually
        //#include "<DataPath>/Environment.any"
      };

      //Connection between environment and the human
      AnyFolder ModelEnvironmentConnection = {

        #include "JointsAndDriversLocal.any"
//        AnyFolder Drivers={
//
//          // Aliases for convenient referencing
//          AnyFolder &JntPos=..Mannequin.Posture;
//          AnyFolder &JntVel=..Mannequin.PostureVel;
//        };
      };

      #include "JointAngleOutputs.any"

      Kinematics.PosAnalysisOnlyOnOff=On; //only run the position analysis
      nStep=floor((Main.TrialSpecificData.tEnd-Main.TrialSpecificData.tStart)*100/Main.TrialSpecificData.DownSampleRate); //run this analysis with a reduced step number be carefull it can be too low!
      Gravity = ..ModelSetup.Gravity;
      tStart = Main.TrialSpecificData.tStart+2*Kinematics.ApproxVelAccPerturb;
      tEnd = Main.TrialSpecificData.tEnd-2*Kinematics.ApproxVelAccPerturb;

      InitialConditions.SolverType = KinSolOverDeterminate;
      Kinematics.SolverType = KinSolOverDeterminate;
      InitialConditions.KinematicTol=1e-3;//this is only used for generating the initial guess just have to be good enough to get started
      Kinematics.KinematicTol=1e-3; //this is only used for generating the initial guess just have to be good enough to get started

    };


    AnyBodyStudy AdjustmentModel = {

           AnyFolder &UpdateHTMLURL = Main.Project.Tasks.Motion_And_Param_Opt_Model.Description;

          AnyFolder &UpdateHTMLURL2 =Main.Project.Tasks.Motion_And_Param_Opt_Model.Motion_and_Param_Optimization.Description;

      AnyFolder &C3DData=..ModelSetup.C3DFileData ;

      AnyFolder &BodyModel=.HumanModel.BodyModel;


      //This mannequin calculates a guess on the initial pelvis position based on ASIS and PSI markers
      //if these markers do not exist in the markerset used this has to be changed
      //  #include "Mannequin.any"  // this file controls the initial position of the model and he posture

      //Environment around the human
      AnyFolder EnvironmentModel ={
        //Model of the floor and force plates this is where the force plates are defined
        AnyFolder &BodyModelRef=.BodyModel;
        //This environment file makes use of automatic detection of which foot are incontact with which plate
        #include "<DataPath>/EnvironmentAutoDetection.any"
        //This environment file has no automatic detecteion of which foot are incontact with which plate it has to be set manually
        // #include "<DataPath>/Environment.any"
      };

      //Connection between environment and the human
      AnyFolder ModelEnvironmentConnection = {
        AnyFolder &BodyModel=.BodyModel;
        #include "JointsAndDriversLocal.any"

        Drivers={

          // Aliases for convenient referencing
          AnyFolder &JntPos=...KinematicStudyForParameterIdentification.Mannequin.Posture;
          AnyFolder &JntVel=...KinematicStudyForParameterIdentification.Mannequin.PostureVel;
        };
      };

      Kinematics.PosAnalysisOnlyOnOff=On; //only run the position analysis
      nStep=1;
      Gravity = ..ModelSetup.Gravity;
      tStart = Main.TrialSpecificData.tStart+2*Kinematics.ApproxVelAccPerturb;
      tEnd = Main.TrialSpecificData.tEnd-2*Kinematics.ApproxVelAccPerturb;

      InitialConditions.SolverType = KinSolOverDeterminate;
      Kinematics.SolverType = KinSolOverDeterminate;
      InitialConditions.KinematicTol=1e-4;
      Kinematics.KinematicTol=1e-4;

      #include "UndefineBodyPartSetup.any"

    };


    AnyOptKinStudy ParameterIdentification =     {
      AnyFolder &StudyRef = .KinematicStudyForParameterIdentification;
      ParameterOptimization.ConvergenceTol=1e-2; //this has shown in pratice to work in a good way... the designvariables will not change much if the value was lowered.
      //note that the full analysis with normal tolerances is done later...
      Analysis =   {
        AnyOperation &ref = .StudyRef.Kinematics;
      };
    };

    AnyBodyStudy MotionOptimization = {


      AnyFolder &UpdateHTMLURL = Main.Project.Tasks.Motion_And_Param_Opt_Model.Description;

      AnyFolder &C3DData=..ModelSetup.C3DFileData ;

      AnyFolder &BodyModel=.HumanModel.BodyModel;
      AnyFolder &ModelOptimizationModel=.KinematicStudyForParameterIdentification;
      AnyFolder &JointAngleOutput=.KinematicStudyForParameterIdentification.JointAngleOutputs;

      Kinematics.PosAnalysisOnlyOnOff=On;
      nStep=floor((Main.TrialSpecificData.tEnd-Main.TrialSpecificData.tStart)*100);
      Gravity = ..ModelSetup.Gravity;
      tStart = Main.TrialSpecificData.tStart+2*Kinematics.ApproxVelAccPerturb;
      tEnd = Main.TrialSpecificData.tEnd-2*Kinematics.ApproxVelAccPerturb;

      InitialConditions.SolverType = KinSolOverDeterminate;
      Kinematics.SolverType = KinSolOverDeterminate;
         InitialConditions.KinematicTol=1e-3;//this is only used for generating the initial guess just have to be good enough to get started
      Kinematics.KinematicTol=1e-3; //this is only used for generating the initial guess just have to be good enough to get started


    };
  };
};
#undef MotionAndParameterOptimizationModel
#undef InverseDynamicModel
#undef HumanModelPresent
#undef MotionAndParamOptimization
#undef IntialPositionStudy
#undef MarkersPresent
