#if HeadMarkersOnOff == OFF
 #if BM_TRUNK == ON
 AnyKinEqSimpleDriver NeckDrv=
 {
   AnyKinMeasureOrg &ref0 = ...BodyModel.Interface.Trunk.NeckJoint;
   DriverPos=pi/180*{.JntPos.NeckExtension};
   DriverVel=pi/180*{.JntVel.NeckExtension};
   Reaction.Type={Off};
   //CType = {Soft};
 };
 #endif
 #if BM_TRUNK_NECK == ON
 AnyKinEqSimpleDriver NeckDrv=
 {
   AnyKinMeasureOrg &ref0 = ...BodyModel.Interface.Trunk.SkullThoraxFlexion;
   AnyKinMeasureOrg &ref1 = ...BodyModel.Interface.Trunk.SkullThoraxLateralBending;
   AnyKinMeasureOrg &ref2 = ...BodyModel.Interface.Trunk.SkullThoraxRotation;
   DriverPos=pi/180*{0, 0, 0};
   DriverVel=pi/180*{0, 0, 0};
   Reaction.Type={Off, Off, Off};
   //CType = {Soft, Soft, Soft};
 };
 #endif
#endif

#if TrunkMarkersOnOff == OFF
 AnyKinEqSimpleDriver PelvisThoraxDrv =
 {
     AnyKinMeasure& ref0 = ...BodyModel.Interface.Trunk.PelvisThoraxExtension;
     AnyKinMeasure& ref1 = ...BodyModel.Interface.Trunk.PelvisThoraxLateralBending;
     AnyKinMeasure& ref2 = ...BodyModel.Interface.Trunk.PelvisThoraxRotation;
     DriverPos = pi/180*
     {
         .JntPos.PelvisThoraxExtension,
         .JntPos.PelvisThoraxLateralBending,
         .JntPos.PelvisThoraxRotation
     };
     DriverVel =  pi/180*
     {
         .JntVel.PelvisThoraxExtension,
         .JntVel.PelvisThoraxLateralBending,
         .JntVel.PelvisThoraxRotation
     };
     Reaction.Type = {Off, Off, Off};
     //CType = {Soft, Soft, Soft};
 };
#endif

#if ThreeFootMarkersOnOff == OFF
 AnyKinEqSimpleDriver AnkleDriverRight={
   AnyKinMeasureOrg &ref2= Main.Studies.HumanModel.BodyModel.Interface.Right.SubTalarEversion;
   DriverPos = pi/180*{.JntPos.Right.SubTalarEversion};
   DriverVel=pi/180*{.JntVel.Right.SubTalarEversion};
   CType = {Soft};
   Reaction.Type={Off};
   //CType = {Soft};
 };
 AnyKinEqSimpleDriver AnkleDriverLeft={
   AnyKinMeasureOrg &ref2= Main.Studies.HumanModel.BodyModel.Interface.Left.SubTalarEversion;
   DriverPos = pi/180*{.JntPos.Left.SubTalarEversion};
   DriverVel=pi/180*{.JntVel.Left.SubTalarEversion};
   CType = {Soft};
   Reaction.Type={Off};
   //CType = {Soft};
 };
#endif

#if BM_ARM_LEFT == ON
 #if BM_ARM_SHOULDER_RHYTHM_LEFT == OFF
  AnyKinEqSimpleDriver SCAxialRotationDriverLeft =
  {
    AnyKinMeasureOrg &ref3 =...BodyModel.Interface.Left.SternoClavicularAxialRotation;
    DriverPos = pi/180*
    {
      .JntPos.Left.SternoClavicularAxialRotation
    };
    DriverVel = pi/180*
    {
      .JntVel.Left.SternoClavicularAxialRotation
    };
    Reaction.Type={Off};
    //CType = {Soft};
  };
  #if SCMarkersOnOff == OFF
  AnyKinEqSimpleDriver SCProtractionDriverLeft =
  {
    AnyKinMeasureOrg &ref3 =...BodyModel.Interface.Left.SternoClavicularProtraction;
    DriverPos = pi/180*
    {
      .JntPos.Left.SternoClavicularProtraction
    };
    DriverVel = pi/180*
    {
      .JntVel.Left.SternoClavicularProtraction
    };
    Reaction.Type={Off};
    //CType = {Soft};
  };
  AnyKinEqSimpleDriver SCElevationDriverLeft =
  {
    AnyKinMeasureOrg &ref3 =...BodyModel.Interface.Left.SternoClavicularElevation;
    DriverPos = pi/180*
    {
      .JntPos.Left.SternoClavicularElevation
    };
    DriverVel = pi/180*
    {
      .JntVel.Left.SternoClavicularElevation
    };
    Reaction.Type={Off};
    //CType = {Soft};
  };
  #endif
 #endif
#endif

#if BM_ARM_RIGHT == ON
 #if BM_ARM_SHOULDER_RHYTHM_RIGHT == OFF
  AnyKinEqSimpleDriver SCAxialRotationDriverRight =
  {
    AnyKinMeasureOrg &ref3 =...BodyModel.Interface.Right.SternoClavicularAxialRotation;
    DriverPos = pi/180*
    {
      .JntPos.Right.SternoClavicularAxialRotation
    };
    DriverVel =
    {
      .JntVel.Right.SternoClavicularAxialRotation
    };
    Reaction.Type={Off};
    //CType = {Soft};
  };
  #if SCMarkersOnOff == OFF
   AnyKinEqSimpleDriver SCProtractionDriverRight =
   {
     AnyKinMeasureOrg &ref3 =...BodyModel.Interface.Right.SternoClavicularProtraction;
     DriverPos = pi/180*
     {
       .JntPos.Right.SternoClavicularProtraction
     };
     DriverVel =
     {
       .JntVel.Right.SternoClavicularProtraction
     };
     Reaction.Type={Off};
     //CType = {Soft};
   };
   AnyKinEqSimpleDriver SCElevationDriverRight =
   {
     AnyKinMeasureOrg &ref3 =...BodyModel.Interface.Right.SternoClavicularElevation;
     DriverPos = pi/180*
     {
       .JntPos.Right.SternoClavicularElevation
     };
     DriverVel =
     {
       .JntVel.Right.SternoClavicularElevation
     };
     Reaction.Type={Off};
     //CType = {Soft};
   };
  #endif
 #endif
#endif
