AnyFolder Model = {
  // Model parts included in the moment arm study
  AnyFolder &PelvisRef = .....HumanFolderRef.Trunk.SegmentsLumbar.PelvisSeg; //This is a reference to the folder which holds the human part of the model
  AnyFolder &LegSegSideRef = .SideHumanFolderRef.Leg.Seg; //This is a reference to the folder which holds the human part of the model
  AnyFolder &LegJntsRef =  .SideHumanFolderRef.Leg.Jnt;
  AnyFolder &LegMusRef = .SideHumanFolderRef.Leg.Mus;
  AnyFolder &SpineMusRef = .SideTrunkMusRef;

  AnyFixedRefFrame ground = {
    AnyRefNode node = {
      ARel=..PelvisRef.Axes0;
      sRel=..PelvisRef.r0;
    };
  };

  AnyFolder Drivers = {
    AnyVar AngularVelocity = (..RangeOfMotion[1]-..RangeOfMotion[0])*pi/180;
    AnyKinMeasureOrg LegMeasure = {
      AnyKinMeasure &HipFlexion= ...SideHumanInterfaceRef.HipFlexion;
      AnyKinMeasure &HipAbduction= ...SideHumanInterfaceRef.HipAbduction;
      AnyKinMeasure &HipExternalRotation= ...SideHumanInterfaceRef.HipExternalRotation;
      AnyKinMeasure &KneeFlexion= ...SideHumanInterfaceRef.KneeFlexion;
      AnyKinMeasure &AnklePlantarFlexion= ...SideHumanInterfaceRef.AnklePlantarFlexion;
      AnyKinMeasure &SubTalarEversion= ...SideHumanInterfaceRef.SubTalarEversion;
    };
    AnyStdJoint PelvisGround={
      AnyRefFrame &Ground = ..ground.node;
      AnyRefFrame &Sacrum= ..PelvisRef;
    };
  };// Drivers
};// Model


AnyKinStudy Study = {
  Gravity = {0,0,0};
  nStep = 40;
  InitialConditions.SolverType = KinSolOverDeterminate;
  AnyFolder &Model = .Model;

  AnyFolder MuscleStrengthCalculations = {
    AnyFolder Abscissa = {
      AnyVar JointAngle =  not(not(..Model.Drivers.LegDriver.DriverVel))*..Model.Drivers.LegMeasure.Pos'*180/pi  ;
    };

#define LEGMUSCLES_FOR_OUTPUT_EXPRESSION_PSOAS(name) AnyVar name = ( .Model.SpineMusRef.PsoasMajor.name.Strength);
#define LEGMUSCLES_FOR_OUTPUT_EXPRESSION_LEG(name) AnyVar name = ( .Model.LegMusRef.name.Strength);
    #include "legmuscles_for_output.any"
#undef LEGMUSCLES_FOR_OUTPUT_EXPRESSION_PSOAS
#undef LEGMUSCLES_FOR_OUTPUT_EXPRESSION_LEG
  };

  AnyFolder PennationAngleCalculations = {
    AnyFolder Abscissa = {
      AnyVar JointAngle =  not(not(..Model.Drivers.LegDriver.DriverVel))*..Model.Drivers.LegMeasure.Pos'*180/pi  ;
    };

#define LEGMUSCLES_FOR_OUTPUT_EXPRESSION_PSOAS(name) AnyVar name = ( .Model.SpineMusRef.PsoasMajor.name.PennationAngle * 180 / pi);
#define LEGMUSCLES_FOR_OUTPUT_EXPRESSION_LEG(name) AnyVar name = ( .Model.LegMusRef.name.PennationAngle * 180 / pi);
    #include "legmuscles_for_output.any"
#undef LEGMUSCLES_FOR_OUTPUT_EXPRESSION_PSOAS
#undef LEGMUSCLES_FOR_OUTPUT_EXPRESSION_LEG
  };


  AnyFolder MuscleReferences = {
//    AnyFolder Abscissa = {
//      AnyVar JointAngle =  not(not(..Model.Drivers.LegDriver.DriverVel))*..Model.Drivers.LegMeasure.Pos'*180/pi  ;
//    };

#define LEGMUSCLES_FOR_OUTPUT_EXPRESSION_PSOAS(name) AnyMuscle& name = .Model.SpineMusRef.PsoasMajor.name;
#define LEGMUSCLES_FOR_OUTPUT_EXPRESSION_LEG(name) AnyMuscle& name = .Model.LegMusRef.name;
    #include "legmuscles_for_output.any"
#undef LEGMUSCLES_FOR_OUTPUT_EXPRESSION_PSOAS
#undef LEGMUSCLES_FOR_OUTPUT_EXPRESSION_LEG
};

  AnyFolder MomentArmCalculations = {
    AnyFolder Abscissa = {
      AnyVar JointAngle =  not(not(..Model.Drivers.LegDriver.DriverVel))*..Model.Drivers.LegMeasure.Pos'*180/pi  ;
    };

#define LEGMUSCLES_FOR_OUTPUT_EXPRESSION_PSOAS(name) AnyVar name = ( -1*.Model.SpineMusRef.PsoasMajor.name.LmtDot/.Model.Drivers.AngularVelocity);
#define LEGMUSCLES_FOR_OUTPUT_EXPRESSION_LEG(name) AnyVar name = ( -1*.Model.LegMusRef.name.LmtDot/.Model.Drivers.AngularVelocity);
    #include "legmuscles_for_output.any"
#undef LEGMUSCLES_FOR_OUTPUT_EXPRESSION_PSOAS
#undef LEGMUSCLES_FOR_OUTPUT_EXPRESSION_LEG


//    AnyVar PsoasMajorT12I = -1*.Model.SpineMusRef.PsoasMajor.PMT12I_TM.LmtDot/.Model.Drivers.AngularVelocity;
//    AnyVar PsoasMajorL1I = -1*.Model.SpineMusRef.PsoasMajor.PML1I_TM.LmtDot/.Model.Drivers.AngularVelocity;
//    AnyVar PsoasMajorL1T = -1*.Model.SpineMusRef.PsoasMajor.PML1T_TM.LmtDot/.Model.Drivers.AngularVelocity;
//    AnyVar PsoasMajorL2I = -1*.Model.SpineMusRef.PsoasMajor.PML2I_TM.LmtDot/.Model.Drivers.AngularVelocity;
//    AnyVar PsoasMajorL2T = -1*.Model.SpineMusRef.PsoasMajor.PML2T_TM.LmtDot/.Model.Drivers.AngularVelocity;
//    AnyVar PsoasMajorL3I = -1*.Model.SpineMusRef.PsoasMajor.PML3I_TM.LmtDot/.Model.Drivers.AngularVelocity;
//    AnyVar PsoasMajorL3T = -1*.Model.SpineMusRef.PsoasMajor.PML3T_TM.LmtDot/.Model.Drivers.AngularVelocity;
//    AnyVar PsoasMajorL4I = -1*.Model.SpineMusRef.PsoasMajor.PML4I_TM.LmtDot/.Model.Drivers.AngularVelocity;
//    AnyVar PsoasMajorL4T = -1*.Model.SpineMusRef.PsoasMajor.PML4T_TM.LmtDot/.Model.Drivers.AngularVelocity;
//    AnyVar PsoasMajorL5 = -1*.Model.SpineMusRef.PsoasMajor.PML5_TM.LmtDot/.Model.Drivers.AngularVelocity;
//    AnyVar PsoasMajorL5T = -1*.Model.SpineMusRef.PsoasMajor.PML5T_TM.LmtDot/.Model.Drivers.AngularVelocity;
//    //
//
//    AnyVar SoleusMedialis1 = ( -1*.Model.LegMusRef.SoleusMedialis1.LmtDot/.Model.Drivers.AngularVelocity);
//    AnyVar SoleusMedialis2 = ( -1*.Model.LegMusRef.SoleusMedialis2.LmtDot/.Model.Drivers.AngularVelocity);
//    AnyVar SoleusMedialis3 = ( -1*.Model.LegMusRef.SoleusMedialis3.LmtDot/.Model.Drivers.AngularVelocity);
//    AnyVar SoleusLateralis1 = ( -1*.Model.LegMusRef.SoleusLateralis1.LmtDot/.Model.Drivers.AngularVelocity);
//    AnyVar SoleusLateralis2 = ( -1*.Model.LegMusRef.SoleusLateralis2.LmtDot/.Model.Drivers.AngularVelocity);
//    AnyVar SoleusLateralis3 = ( -1*.Model.LegMusRef.SoleusLateralis3.LmtDot/.Model.Drivers.AngularVelocity);
//    AnyVar GastrocnemiusLateralis1 = ( -1*.Model.LegMusRef.GastrocnemiusLateralis1.LmtDot/.Model.Drivers.AngularVelocity);
//    AnyVar GastrocnemiusMedialis1 = ( -1*.Model.LegMusRef.GastrocnemiusMedialis1.LmtDot/.Model.Drivers.AngularVelocity);
//    AnyVar FlexorDigitorumLongus1 = ( -1*.Model.LegMusRef.FlexorDigitorumLongus1.LmtDot/.Model.Drivers.AngularVelocity);
//    AnyVar FlexorDigitorumLongus2 = ( -1*.Model.LegMusRef.FlexorDigitorumLongus2.LmtDot/.Model.Drivers.AngularVelocity);
//    AnyVar FlexorDigitorumLongus3 = ( -1*.Model.LegMusRef.FlexorDigitorumLongus3.LmtDot/.Model.Drivers.AngularVelocity);
//    AnyVar FlexorHallucisLongus1 = ( -1*.Model.LegMusRef.FlexorHallucisLongus1.LmtDot/.Model.Drivers.AngularVelocity);
//    AnyVar FlexorHallucisLongus2 = ( -1*.Model.LegMusRef.FlexorHallucisLongus2.LmtDot/.Model.Drivers.AngularVelocity);
//    AnyVar FlexorHallucisLongus3 = ( -1*.Model.LegMusRef.FlexorHallucisLongus3.LmtDot/.Model.Drivers.AngularVelocity);
//    AnyVar TibialisPosteriorLateralis1 = ( -1*.Model.LegMusRef.TibialisPosteriorLateralis1.LmtDot/.Model.Drivers.AngularVelocity);
//    AnyVar TibialisPosteriorLateralis2 = ( -1*.Model.LegMusRef.TibialisPosteriorLateralis2.LmtDot/.Model.Drivers.AngularVelocity);
//    AnyVar TibialisPosteriorLateralis3 = ( -1*.Model.LegMusRef.TibialisPosteriorLateralis3.LmtDot/.Model.Drivers.AngularVelocity);
//    AnyVar TibialisPosteriorMedialis1 = ( -1*.Model.LegMusRef.TibialisPosteriorMedialis1.LmtDot/.Model.Drivers.AngularVelocity);
//    AnyVar TibialisPosteriorMedialis2 = ( -1*.Model.LegMusRef.TibialisPosteriorMedialis2.LmtDot/.Model.Drivers.AngularVelocity);
//    AnyVar TibialisPosteriorMedialis3 = ( -1*.Model.LegMusRef.TibialisPosteriorMedialis3.LmtDot/.Model.Drivers.AngularVelocity);
//    AnyVar TibialisAnterior1 = ( -1*.Model.LegMusRef.TibialisAnterior1.LmtDot/.Model.Drivers.AngularVelocity);
//    AnyVar TibialisAnterior2 = ( -1*.Model.LegMusRef.TibialisAnterior2.LmtDot/.Model.Drivers.AngularVelocity);
//    AnyVar TibialisAnterior3 = ( -1*.Model.LegMusRef.TibialisAnterior3.LmtDot/.Model.Drivers.AngularVelocity);
//    AnyVar PeroneusBrevis1 = ( -1*.Model.LegMusRef.PeroneusBrevis1.LmtDot/.Model.Drivers.AngularVelocity);
//    AnyVar PeroneusBrevis2 = ( -1*.Model.LegMusRef.PeroneusBrevis2.LmtDot/.Model.Drivers.AngularVelocity);
//    AnyVar PeroneusBrevis3 = ( -1*.Model.LegMusRef.PeroneusBrevis3.LmtDot/.Model.Drivers.AngularVelocity);
//    AnyVar PeroneusLongus1 = ( -1*.Model.LegMusRef.PeroneusLongus1.LmtDot/.Model.Drivers.AngularVelocity);
//    AnyVar PeroneusLongus2 = ( -1*.Model.LegMusRef.PeroneusLongus2.LmtDot/.Model.Drivers.AngularVelocity);
//    AnyVar PeroneusLongus3 = ( -1*.Model.LegMusRef.PeroneusLongus3.LmtDot/.Model.Drivers.AngularVelocity);
//    AnyVar PeroneusTertius1 = ( -1*.Model.LegMusRef.PeroneusTertius1.LmtDot/.Model.Drivers.AngularVelocity);
//    AnyVar PeroneusTertius2 = ( -1*.Model.LegMusRef.PeroneusTertius2.LmtDot/.Model.Drivers.AngularVelocity);
//    AnyVar PeroneusTertius3 = ( -1*.Model.LegMusRef.PeroneusTertius3.LmtDot/.Model.Drivers.AngularVelocity);
//    AnyVar ExtensorDigitorumLongus1 = ( -1*.Model.LegMusRef.ExtensorDigitorumLongus1.LmtDot/.Model.Drivers.AngularVelocity);
//    AnyVar ExtensorDigitorumLongus2 = ( -1*.Model.LegMusRef.ExtensorDigitorumLongus2.LmtDot/.Model.Drivers.AngularVelocity);
//    AnyVar ExtensorDigitorumLongus3 = ( -1*.Model.LegMusRef.ExtensorDigitorumLongus3.LmtDot/.Model.Drivers.AngularVelocity);
//    AnyVar ExtensorHallucisLongus1 = ( -1*.Model.LegMusRef.ExtensorHallucisLongus1.LmtDot/.Model.Drivers.AngularVelocity);
//    AnyVar ExtensorHallucisLongus2 = ( -1*.Model.LegMusRef.ExtensorHallucisLongus2.LmtDot/.Model.Drivers.AngularVelocity);
//    AnyVar ExtensorHallucisLongus3 = ( -1*.Model.LegMusRef.ExtensorHallucisLongus3.LmtDot/.Model.Drivers.AngularVelocity);
//    AnyVar VastusLateralisInferior1 = ( -1*.Model.LegMusRef.VastusLateralisInferior1.LmtDot/.Model.Drivers.AngularVelocity);
//    AnyVar VastusLateralisInferior2 = ( -1*.Model.LegMusRef.VastusLateralisInferior2.LmtDot/.Model.Drivers.AngularVelocity);
//    AnyVar VastusLateralisInferior3 = ( -1*.Model.LegMusRef.VastusLateralisInferior3.LmtDot/.Model.Drivers.AngularVelocity);
//    AnyVar VastusLateralisInferior4 = ( -1*.Model.LegMusRef.VastusLateralisInferior4.LmtDot/.Model.Drivers.AngularVelocity);
//    AnyVar VastusLateralisInferior5 = ( -1*.Model.LegMusRef.VastusLateralisInferior5.LmtDot/.Model.Drivers.AngularVelocity);
//    AnyVar VastusLateralisInferior6 = ( -1*.Model.LegMusRef.VastusLateralisInferior6.LmtDot/.Model.Drivers.AngularVelocity);
//    AnyVar VastusLateralisSuperior1 = ( -1*.Model.LegMusRef.VastusLateralisSuperior1.LmtDot/.Model.Drivers.AngularVelocity);
//    AnyVar VastusLateralisSuperior2 = ( -1*.Model.LegMusRef.VastusLateralisSuperior2.LmtDot/.Model.Drivers.AngularVelocity);
//    AnyVar VastusMedialisInferior1 = ( -1*.Model.LegMusRef.VastusMedialisInferior1.LmtDot/.Model.Drivers.AngularVelocity);
//    AnyVar VastusMedialisInferior2 = ( -1*.Model.LegMusRef.VastusMedialisInferior2.LmtDot/.Model.Drivers.AngularVelocity);
//    AnyVar VastusMedialisMid1 = ( -1*.Model.LegMusRef.VastusMedialisMid1.LmtDot/.Model.Drivers.AngularVelocity);
//    AnyVar VastusMedialisMid2 = ( -1*.Model.LegMusRef.VastusMedialisMid2.LmtDot/.Model.Drivers.AngularVelocity);
//    AnyVar VastusMedialisSuperior1 = ( -1*.Model.LegMusRef.VastusMedialisSuperior1.LmtDot/.Model.Drivers.AngularVelocity);
//    AnyVar VastusMedialisSuperior2 = ( -1*.Model.LegMusRef.VastusMedialisSuperior2.LmtDot/.Model.Drivers.AngularVelocity);
//    AnyVar VastusMedialisSuperior3 = ( -1*.Model.LegMusRef.VastusMedialisSuperior3.LmtDot/.Model.Drivers.AngularVelocity);
//    AnyVar VastusMedialisSuperior4 = ( -1*.Model.LegMusRef.VastusMedialisSuperior4.LmtDot/.Model.Drivers.AngularVelocity);
//    AnyVar VastusMedialisSuperior5 = ( -1*.Model.LegMusRef.VastusMedialisSuperior5.LmtDot/.Model.Drivers.AngularVelocity);
//    AnyVar VastusMedialisSuperior6 = ( -1*.Model.LegMusRef.VastusMedialisSuperior6.LmtDot/.Model.Drivers.AngularVelocity);
//    AnyVar VastusIntermedius1 = ( -1*.Model.LegMusRef.VastusIntermedius1.LmtDot/.Model.Drivers.AngularVelocity);
//    AnyVar VastusIntermedius2 = ( -1*.Model.LegMusRef.VastusIntermedius2.LmtDot/.Model.Drivers.AngularVelocity);
//    AnyVar VastusIntermedius3 = ( -1*.Model.LegMusRef.VastusIntermedius3.LmtDot/.Model.Drivers.AngularVelocity);
//    AnyVar VastusIntermedius4 = ( -1*.Model.LegMusRef.VastusIntermedius4.LmtDot/.Model.Drivers.AngularVelocity);
//    AnyVar VastusIntermedius5 = ( -1*.Model.LegMusRef.VastusIntermedius5.LmtDot/.Model.Drivers.AngularVelocity);
//    AnyVar VastusIntermedius6 = ( -1*.Model.LegMusRef.VastusIntermedius6.LmtDot/.Model.Drivers.AngularVelocity);
//    AnyVar RectusFemoris1 = ( -1*.Model.LegMusRef.RectusFemoris1.LmtDot/.Model.Drivers.AngularVelocity);
//    AnyVar RectusFemoris2 = ( -1*.Model.LegMusRef.RectusFemoris2.LmtDot/.Model.Drivers.AngularVelocity);
//    AnyVar Semitendinosus1 = ( -1*.Model.LegMusRef.Semitendinosus1.LmtDot/.Model.Drivers.AngularVelocity);
//    AnyVar Semimembranosus1 = ( -1*.Model.LegMusRef.Semimembranosus1.LmtDot/.Model.Drivers.AngularVelocity);
//    AnyVar BicepsFemorisCaputLongum1 = ( -1*.Model.LegMusRef.BicepsFemorisCaputLongum1.LmtDot/.Model.Drivers.AngularVelocity);
//    AnyVar BicepsFemorisCaputBreve1 = ( -1*.Model.LegMusRef.BicepsFemorisCaputBreve1.LmtDot/.Model.Drivers.AngularVelocity);
//    AnyVar BicepsFemorisCaputBreve2 = ( -1*.Model.LegMusRef.BicepsFemorisCaputBreve2.LmtDot/.Model.Drivers.AngularVelocity);
//    AnyVar BicepsFemorisCaputBreve3 = ( -1*.Model.LegMusRef.BicepsFemorisCaputBreve3.LmtDot/.Model.Drivers.AngularVelocity);
//    AnyVar SartoriusProximal1 = ( -1*.Model.LegMusRef.SartoriusProximal1.LmtDot/.Model.Drivers.AngularVelocity);
//    AnyVar SartoriusDistal1 = ( -1*.Model.LegMusRef.SartoriusDistal1.LmtDot/.Model.Drivers.AngularVelocity);
//    AnyVar IliacusLateralis1 = ( -1*.Model.LegMusRef.IliacusLateralis1.LmtDot/.Model.Drivers.AngularVelocity);
//    AnyVar IliacusLateralis2 = ( -1*.Model.LegMusRef.IliacusLateralis2.LmtDot/.Model.Drivers.AngularVelocity);
//    AnyVar IliacusLateralis3 = ( -1*.Model.LegMusRef.IliacusLateralis3.LmtDot/.Model.Drivers.AngularVelocity);
//    AnyVar IliacusMid1 = ( -1*.Model.LegMusRef.IliacusMid1.LmtDot/.Model.Drivers.AngularVelocity);
//    AnyVar IliacusMid2 = ( -1*.Model.LegMusRef.IliacusMid2.LmtDot/.Model.Drivers.AngularVelocity);
//    AnyVar IliacusMid3 = ( -1*.Model.LegMusRef.IliacusMid3.LmtDot/.Model.Drivers.AngularVelocity);
//    AnyVar IliacusMedialis1 = ( -1*.Model.LegMusRef.IliacusMedialis1.LmtDot/.Model.Drivers.AngularVelocity);
//    AnyVar IliacusMedialis2 = ( -1*.Model.LegMusRef.IliacusMedialis2.LmtDot/.Model.Drivers.AngularVelocity);
//    AnyVar IliacusMedialis3 = ( -1*.Model.LegMusRef.IliacusMedialis3.LmtDot/.Model.Drivers.AngularVelocity);
//    AnyVar GluteusMinimusAnterior1 = ( -1*.Model.LegMusRef.GluteusMinimusAnterior1.LmtDot/.Model.Drivers.AngularVelocity);
//    AnyVar GluteusMinimusMid1 = ( -1*.Model.LegMusRef.GluteusMinimusMid1.LmtDot/.Model.Drivers.AngularVelocity);
//    AnyVar GluteusMinimusPosterior1 = ( -1*.Model.LegMusRef.GluteusMinimusPosterior1.LmtDot/.Model.Drivers.AngularVelocity);
//    AnyVar GluteusMediusAnterior1 = ( -1*.Model.LegMusRef.GluteusMediusAnterior1.LmtDot/.Model.Drivers.AngularVelocity);
//    AnyVar GluteusMediusAnterior2 = ( -1*.Model.LegMusRef.GluteusMediusAnterior2.LmtDot/.Model.Drivers.AngularVelocity);
//    AnyVar GluteusMediusAnterior3 = ( -1*.Model.LegMusRef.GluteusMediusAnterior3.LmtDot/.Model.Drivers.AngularVelocity);
//    AnyVar GluteusMediusAnterior4 = ( -1*.Model.LegMusRef.GluteusMediusAnterior4.LmtDot/.Model.Drivers.AngularVelocity);
//    AnyVar GluteusMediusAnterior5 = ( -1*.Model.LegMusRef.GluteusMediusAnterior5.LmtDot/.Model.Drivers.AngularVelocity);
//    AnyVar GluteusMediusAnterior6 = ( -1*.Model.LegMusRef.GluteusMediusAnterior6.LmtDot/.Model.Drivers.AngularVelocity);
//    AnyVar GluteusMediusPosterior1 = ( -1*.Model.LegMusRef.GluteusMediusPosterior1.LmtDot/.Model.Drivers.AngularVelocity);
//    AnyVar GluteusMediusPosterior2 = ( -1*.Model.LegMusRef.GluteusMediusPosterior2.LmtDot/.Model.Drivers.AngularVelocity);
//    AnyVar GluteusMediusPosterior3 = ( -1*.Model.LegMusRef.GluteusMediusPosterior3.LmtDot/.Model.Drivers.AngularVelocity);
//    AnyVar GluteusMediusPosterior4 = ( -1*.Model.LegMusRef.GluteusMediusPosterior4.LmtDot/.Model.Drivers.AngularVelocity);
//    AnyVar GluteusMediusPosterior5 = ( -1*.Model.LegMusRef.GluteusMediusPosterior5.LmtDot/.Model.Drivers.AngularVelocity);
//    AnyVar GluteusMediusPosterior6 = ( -1*.Model.LegMusRef.GluteusMediusPosterior6.LmtDot/.Model.Drivers.AngularVelocity);
//    AnyVar GluteusMaximusSuperior1 = ( -1*.Model.LegMusRef.GluteusMaximusSuperior1.LmtDot/.Model.Drivers.AngularVelocity);
//    AnyVar GluteusMaximusSuperior2 = ( -1*.Model.LegMusRef.GluteusMaximusSuperior2.LmtDot/.Model.Drivers.AngularVelocity);
//    AnyVar GluteusMaximusSuperior3 = ( -1*.Model.LegMusRef.GluteusMaximusSuperior3.LmtDot/.Model.Drivers.AngularVelocity);
//    AnyVar GluteusMaximusSuperior4 = ( -1*.Model.LegMusRef.GluteusMaximusSuperior4.LmtDot/.Model.Drivers.AngularVelocity);
//    AnyVar GluteusMaximusSuperior5 = ( -1*.Model.LegMusRef.GluteusMaximusSuperior5.LmtDot/.Model.Drivers.AngularVelocity);
//    AnyVar GluteusMaximusSuperior6 = ( -1*.Model.LegMusRef.GluteusMaximusSuperior6.LmtDot/.Model.Drivers.AngularVelocity);
//    AnyVar GluteusMaximusInferior1 = ( -1*.Model.LegMusRef.GluteusMaximusInferior1.LmtDot/.Model.Drivers.AngularVelocity);
//    AnyVar GluteusMaximusInferior2 = ( -1*.Model.LegMusRef.GluteusMaximusInferior2.LmtDot/.Model.Drivers.AngularVelocity);
//    AnyVar GluteusMaximusInferior3 = ( -1*.Model.LegMusRef.GluteusMaximusInferior3.LmtDot/.Model.Drivers.AngularVelocity);
//    AnyVar GluteusMaximusInferior4 = ( -1*.Model.LegMusRef.GluteusMaximusInferior4.LmtDot/.Model.Drivers.AngularVelocity);
//    AnyVar GluteusMaximusInferior5 = ( -1*.Model.LegMusRef.GluteusMaximusInferior5.LmtDot/.Model.Drivers.AngularVelocity);
//    AnyVar GluteusMaximusInferior6 = ( -1*.Model.LegMusRef.GluteusMaximusInferior6.LmtDot/.Model.Drivers.AngularVelocity);
//    AnyVar TensorFasciaeLatae1 = ( -1*.Model.LegMusRef.TensorFasciaeLatae1.LmtDot/.Model.Drivers.AngularVelocity);
//    AnyVar TensorFasciaeLatae2 = ( -1*.Model.LegMusRef.TensorFasciaeLatae2.LmtDot/.Model.Drivers.AngularVelocity);
//    AnyVar Piriformis1 = ( -1*.Model.LegMusRef.Piriformis1.LmtDot/.Model.Drivers.AngularVelocity);
//    AnyVar Gracilis1 = ( -1*.Model.LegMusRef.Gracilis1.LmtDot/.Model.Drivers.AngularVelocity);
//    AnyVar Gracilis2 = ( -1*.Model.LegMusRef.Gracilis2.LmtDot/.Model.Drivers.AngularVelocity);
//    AnyVar AdductorLongus1 = ( -1*.Model.LegMusRef.AdductorLongus1.LmtDot/.Model.Drivers.AngularVelocity);
//    AnyVar AdductorLongus2 = ( -1*.Model.LegMusRef.AdductorLongus2.LmtDot/.Model.Drivers.AngularVelocity);
//    AnyVar AdductorLongus3 = ( -1*.Model.LegMusRef.AdductorLongus3.LmtDot/.Model.Drivers.AngularVelocity);
//    AnyVar AdductorLongus4 = ( -1*.Model.LegMusRef.AdductorLongus4.LmtDot/.Model.Drivers.AngularVelocity);
//    AnyVar AdductorLongus5 = ( -1*.Model.LegMusRef.AdductorLongus5.LmtDot/.Model.Drivers.AngularVelocity);
//    AnyVar AdductorLongus6 = ( -1*.Model.LegMusRef.AdductorLongus6.LmtDot/.Model.Drivers.AngularVelocity);
//    AnyVar AdductorMagnusDistal1 = ( -1*.Model.LegMusRef.AdductorMagnusDistal1.LmtDot/.Model.Drivers.AngularVelocity);
//    AnyVar AdductorMagnusDistal2 = ( -1*.Model.LegMusRef.AdductorMagnusDistal2.LmtDot/.Model.Drivers.AngularVelocity);
//    AnyVar AdductorMagnusDistal3 = ( -1*.Model.LegMusRef.AdductorMagnusDistal3.LmtDot/.Model.Drivers.AngularVelocity);
//    AnyVar AdductorMagnusMid1 = ( -1*.Model.LegMusRef.AdductorMagnusMid1.LmtDot/.Model.Drivers.AngularVelocity);
//    AnyVar AdductorMagnusMid2 = ( -1*.Model.LegMusRef.AdductorMagnusMid2.LmtDot/.Model.Drivers.AngularVelocity);
//    AnyVar AdductorMagnusMid3 = ( -1*.Model.LegMusRef.AdductorMagnusMid3.LmtDot/.Model.Drivers.AngularVelocity);
//    AnyVar AdductorMagnusMid4 = ( -1*.Model.LegMusRef.AdductorMagnusMid4.LmtDot/.Model.Drivers.AngularVelocity);
//    AnyVar AdductorMagnusMid5 = ( -1*.Model.LegMusRef.AdductorMagnusMid5.LmtDot/.Model.Drivers.AngularVelocity);
//    AnyVar AdductorMagnusMid6 = ( -1*.Model.LegMusRef.AdductorMagnusMid6.LmtDot/.Model.Drivers.AngularVelocity);
//    AnyVar AdductorMagnusProximal1 = ( -1*.Model.LegMusRef.AdductorMagnusProximal1.LmtDot/.Model.Drivers.AngularVelocity);
//    AnyVar AdductorMagnusProximal2 = ( -1*.Model.LegMusRef.AdductorMagnusProximal2.LmtDot/.Model.Drivers.AngularVelocity);
//    AnyVar AdductorMagnusProximal3 = ( -1*.Model.LegMusRef.AdductorMagnusProximal3.LmtDot/.Model.Drivers.AngularVelocity);
//    AnyVar AdductorMagnusProximal4 = ( -1*.Model.LegMusRef.AdductorMagnusProximal4.LmtDot/.Model.Drivers.AngularVelocity);
//    AnyVar AdductorBrevisProximal1 = ( -1*.Model.LegMusRef.AdductorBrevisProximal1.LmtDot/.Model.Drivers.AngularVelocity);
//    AnyVar AdductorBrevisProximal2 = ( -1*.Model.LegMusRef.AdductorBrevisProximal2.LmtDot/.Model.Drivers.AngularVelocity);
//    AnyVar AdductorBrevisMid1 = ( -1*.Model.LegMusRef.AdductorBrevisMid1.LmtDot/.Model.Drivers.AngularVelocity);
//    AnyVar AdductorBrevisMid2 = ( -1*.Model.LegMusRef.AdductorBrevisMid2.LmtDot/.Model.Drivers.AngularVelocity);
//    AnyVar AdductorBrevisDistal1 = ( -1*.Model.LegMusRef.AdductorBrevisDistal1.LmtDot/.Model.Drivers.AngularVelocity);
//    AnyVar AdductorBrevisDistal2 = ( -1*.Model.LegMusRef.AdductorBrevisDistal2.LmtDot/.Model.Drivers.AngularVelocity);
//    AnyVar GemellusInferior1 = ( -1*.Model.LegMusRef.GemellusInferior1.LmtDot/.Model.Drivers.AngularVelocity);
//    AnyVar GemellusSuperior1 = ( -1*.Model.LegMusRef.GemellusSuperior1.LmtDot/.Model.Drivers.AngularVelocity);
//    AnyVar ObturatorExternusSuperior1 = ( -1*.Model.LegMusRef.ObturatorExternusSuperior1.LmtDot/.Model.Drivers.AngularVelocity);
//    AnyVar ObturatorExternusSuperior2 = ( -1*.Model.LegMusRef.ObturatorExternusSuperior2.LmtDot/.Model.Drivers.AngularVelocity);
//    AnyVar ObturatorExternusSuperior3 = ( -1*.Model.LegMusRef.ObturatorExternusSuperior3.LmtDot/.Model.Drivers.AngularVelocity);
//    AnyVar ObturatorExternusInferior1 = ( -1*.Model.LegMusRef.ObturatorExternusInferior1.LmtDot/.Model.Drivers.AngularVelocity);
//    AnyVar ObturatorExternusInferior2 = ( -1*.Model.LegMusRef.ObturatorExternusInferior2.LmtDot/.Model.Drivers.AngularVelocity);
//    AnyVar ObturatorInternus1 = ( -1*.Model.LegMusRef.ObturatorInternus1.LmtDot/.Model.Drivers.AngularVelocity);
//    AnyVar ObturatorInternus2 = ( -1*.Model.LegMusRef.ObturatorInternus2.LmtDot/.Model.Drivers.AngularVelocity);
//    AnyVar ObturatorInternus3 = ( -1*.Model.LegMusRef.ObturatorInternus3.LmtDot/.Model.Drivers.AngularVelocity);
//    AnyVar Pectineus1 = ( -1*.Model.LegMusRef.Pectineus1.LmtDot/.Model.Drivers.AngularVelocity);
//    AnyVar Pectineus2 = ( -1*.Model.LegMusRef.Pectineus2.LmtDot/.Model.Drivers.AngularVelocity);
//    AnyVar Pectineus3 = ( -1*.Model.LegMusRef.Pectineus3.LmtDot/.Model.Drivers.AngularVelocity);
//    AnyVar Pectineus4 = ( -1*.Model.LegMusRef.Pectineus4.LmtDot/.Model.Drivers.AngularVelocity);
//    AnyVar Plantaris1 = ( -1*.Model.LegMusRef.Plantaris1.LmtDot/.Model.Drivers.AngularVelocity);
//    //          AnyVar Popliteus1 = ( -1*.Model.LegMusRef.Popliteus1.LmtDot/.Model.Drivers.AngularVelocity);
//    //          AnyVar Popliteus2 = ( -1*.Model.LegMusRef.Popliteus2.LmtDot/.Model.Drivers.AngularVelocity);
//    AnyVar QuadratusFemoris1 = ( -1*.Model.LegMusRef.QuadratusFemoris1.LmtDot/.Model.Drivers.AngularVelocity);
//    AnyVar QuadratusFemoris2 = ( -1*.Model.LegMusRef.QuadratusFemoris2.LmtDot/.Model.Drivers.AngularVelocity);
//    AnyVar QuadratusFemoris3 = ( -1*.Model.LegMusRef.QuadratusFemoris3.LmtDot/.Model.Drivers.AngularVelocity);
//    AnyVar QuadratusFemoris4 = ( -1*.Model.LegMusRef.QuadratusFemoris4.LmtDot/.Model.Drivers.AngularVelocity);
  };
};

AnyOperationMacro MacroCmd =
{

  MacroStr = {"operation " + CompleteNameOf(&.Study.Kinematics),
    "run"
#ifdef OUTPUT_SAVE_PATH
    ,
    "classoperation " + CompleteNameOf(&.Study.Output) + strquote("Save data")
     + " --type=" + strquote("Deep") +" --file=" + strquote(
     OUTPUT_SAVE_PATH + .OutputFileName + ".anydata.h5")
#endif
   };
 };
