AnyFolder ModelParameters = {
  AnyMat33 TF = {{1,0,0},{0,1,0},{0,0,.Sign}};
  #include "ModelSegmentParameters.any"
  #include "ModelJointParameters.any"

   AnyFolder Pelvis = {
    AnyVec3 AsisIpsilateral = {0.0338,    0.0807,    0.0334}*.TF';
    AnyVec3 AsisColateral = {0.0338,    0.0807,   -0.2020}*.TF';
//        AnyVec3 AsisColateral = {0.0338,    0.0807,   -0.2020}*.TF';

    AnyVec3 PsisIpsilateral = {-0.0894,    0.0804,   -0.0470}*.TF';
        AnyVec3 PsisColateral = {    -0.0894,    0.0804,   -0.1175}*.TF';
  //  AnyVec3 PsisColateral = {    -0.0888,    0.0810,   -0.1175}*.TF';

 // AdductorBrevisDistal, Line (2 order) using 2 elements
    AnyVec3 AdductorBrevisDistal2Node = {0.02212,-0.03264,-0.07382}*.TF';
    AnyVec3 AdductorBrevisDistal1Node = {0.02319,-0.03086,-0.07468}*.TF';

    // AdductorBrevisMid, Line (2 order) using 2 elements
    AnyVec3 AdductorBrevisMid2Node = {0.02528,-0.02788,-0.07488}*.TF';
    AnyVec3 AdductorBrevisMid1Node = {0.02829,-0.02370,-0.07456}*.TF';

    // AdductorBrevisProximal, Line (2 order) using 2 elements
    AnyVec3 AdductorBrevisProximal2Node = {0.03220,-0.01821,-0.07377}*.TF';
    AnyVec3 AdductorBrevisProximal1Node = {0.03676,-0.01114,-0.07278}*.TF';

    // AdductorLongus, LineArea (2 order) using 6 elements
    AnyVec3 AdductorLongus6Node = {0.04150,-0.01154,-0.07775}*.TF';
    AnyVec3 AdductorLongus5Node = {0.04171,-0.01026,-0.07695}*.TF';
    AnyVec3 AdductorLongus4Node = {0.04216,-0.00904,-0.07600}*.TF';
    AnyVec3 AdductorLongus3Node = {0.04266,-0.00801,-0.07516}*.TF';
    AnyVec3 AdductorLongus2Node = {0.04313,-0.00708,-0.07422}*.TF';
    AnyVec3 AdductorLongus1Node = {0.04368,-0.00617,-0.07330}*.TF';

    // AdductorMagnusDistal, Line (2 order) using 3 elements
    AnyVec3 AdductorMagnusDistal3Node = {-0.01184,-0.06217,-0.05526}*.TF';
    AnyVec3 AdductorMagnusDistal2Node = {-0.02427,-0.06448,-0.04670}*.TF';
    AnyVec3 AdductorMagnusDistal1Node = {-0.03079,-0.06387,-0.04159}*.TF';

    // AdductorMagnusProximal, Line (2 order) using 4 elements
    AnyVec3 AdductorMagnusProximal1Node = {0.02523,-0.03014,-0.07745}*.TF';
    AnyVec3 AdductorMagnusProximal2Node = {0.02224,-0.03585,-0.07324}*.TF';
    AnyVec3 AdductorMagnusProximal3Node = {0.01986,-0.04151,-0.06944}*.TF';
    AnyVec3 AdductorMagnusProximal4Node = {0.01699,-0.04660,-0.06556}*.TF';

    // AdductorMagnusMid, Line (2 order) using 6 elements
    AnyVec3 AdductorMagnusMid1Node = {0.00499,-0.05578,-0.05761}*.TF';
    AnyVec3 AdductorMagnusMid2Node = {-0.00291,-0.06026,-0.05462}*.TF';
    AnyVec3 AdductorMagnusMid3Node = {-0.01042,-0.06165,-0.05072}*.TF';
    AnyVec3 AdductorMagnusMid4Node = {-0.01643,-0.06298,-0.04623}*.TF';
    AnyVec3 AdductorMagnusMid5Node = {-0.02099,-0.06449,-0.04102}*.TF';
    AnyVec3 AdductorMagnusMid6Node = {-0.02514,-0.06349,-0.03526}*.TF';

    // BicepsFemorisCaputLongum, Point using 1 elements
    AnyVec3 BicepsFemorisCaputLongum1Node = {-0.04738,-0.04247,-0.02611}*.TF';

    // GemellusInferior, Point using 1 elements
    AnyVec3 GemellusInferior1Node = {-0.03562,-0.01646,-0.01567}*.TF';

    // GemellusSuperior, Point using 1 elements
    AnyVec3 GemellusSuperior1Node = {-0.04828,-0.00642,-0.03504}*.TF';

    // GluteusMaximusInferior, Area using 6 elements
    AnyVec3 GluteusMaximusInferior6Node = {-0.07987,0.00892,-0.07269}*.TF';
    AnyVec3 GluteusMaximusInferior5Node = {-0.08267,0.00914,-0.07655}*.TF';
    AnyVec3 GluteusMaximusInferior4Node = {-0.08492,0.01896,-0.05762}*.TF';
    AnyVec3 GluteusMaximusInferior3Node = {-0.08948,0.02379,-0.07041}*.TF';
    AnyVec3 GluteusMaximusInferior2Node = {-0.08467,0.03558,-0.04897}*.TF';
    AnyVec3 GluteusMaximusInferior1Node = {-0.08805,0.03945,-0.05900}*.TF';

    // GluteusMaximusSuperior, Area using 6 elements
    AnyVec3 GluteusMaximusSuperior6Node = {-0.07993,0.07667,-0.03044}*.TF';
    AnyVec3 GluteusMaximusSuperior5Node = {-0.08766,0.07989,-0.03727}*.TF';
    AnyVec3 GluteusMaximusSuperior4Node = {-0.07669,0.09512,-0.02339}*.TF';
    AnyVec3 GluteusMaximusSuperior3Node = {-0.08723,0.10144,-0.02956}*.TF';
    AnyVec3 GluteusMaximusSuperior2Node = {-0.07018,0.11931,-0.01655}*.TF';
    AnyVec3 GluteusMaximusSuperior1Node = {-0.07811,0.12125,-0.01815}*.TF';

    // GluteusMediusAnterior, Area using 6 elements
    AnyVec3 GluteusMediusAnterior6Node = { 0.01113,0.09560,0.04459}*.TF';
    AnyVec3 GluteusMediusAnterior5Node = { 0.01004,0.09005,0.03742}*.TF';
    AnyVec3 GluteusMediusAnterior4Node = {-0.00856,0.10307,0.04559}*.TF';
    AnyVec3 GluteusMediusAnterior3Node = {-0.01068,0.09434,0.03587}*.TF';
    AnyVec3 GluteusMediusAnterior2Node = {-0.02270,0.11128,0.03977}*.TF';
    AnyVec3 GluteusMediusAnterior1Node = {-0.02435,0.10368,0.02959}*.TF';

    // GluteusMediusPosterior, Area using 6 elements
    AnyVec3 GluteusMediusPosterior6Node = {-0.04990,0.07454,-0.01247}*.TF';
    AnyVec3 GluteusMediusPosterior5Node = {-0.06482,0.08309,-0.01927}*.TF';
    AnyVec3 GluteusMediusPosterior4Node = {-0.04105,0.09664,-0.00228}*.TF';
    AnyVec3 GluteusMediusPosterior3Node = {-0.06054,0.11029,-0.01550}*.TF';
    AnyVec3 GluteusMediusPosterior2Node = {-0.03722,0.11308,0.01477}*.TF';
    AnyVec3 GluteusMediusPosterior1Node = {-0.05011,0.12595,0.00349}*.TF';

    // GluteusMinimusAnterior, Area using 2 elements
    AnyVec3 GluteusMinimusAnterior2Node = {0.00941,0.06894,0.02532}*.TF';
    AnyVec3 GluteusMinimusAnterior1Node = {-0.00824,0.08433,0.02917}*.TF';

    // GluteusMinimusMid, Area using 2 elements
    AnyVec3 GluteusMinimusMid2Node = {-0.01005,0.05186,0.01277}*.TF';
    AnyVec3 GluteusMinimusMid1Node = {-0.02701,0.07457,0.00448}*.TF';

    // GluteusMinimusPosterior, Area using 2 elements
    AnyVec3 GluteusMinimusPosterior2Node = {-0.02639,0.03374,0.00345}*.TF';
    AnyVec3 GluteusMinimusPosterior1Node = {-0.03774,0.05215,-0.00660}*.TF';

    // Gracilis, Line (1 order) using 2 elements
    AnyVec3 Gracilis1Node = {0.01360,-0.04919,-0.06466}*.TF';
    AnyVec3 Gracilis2Node = {0.02457,-0.03054,-0.07614}*.TF';

    // IliacusLateralis, Area using 2 elements
    AnyVec3 IliacusLateralis1Node = {0.00931,0.09386,0.03065}*.TF';
    AnyVec3 IliacusLateralis2Node = {0.00122,0.06624,0.00993}*.TF';

    // IliacusMid, Area using 2 elements
    AnyVec3 IliacusMid3Node = {-0.05424,0.02507,0.11115}*.TF';
    AnyVec3 IliacusMid4Node = {-0.05829,-0.00409,0.08208}*.TF';

    // IliacusMedialis, Area using 2 elements
    AnyVec3 IliacusMedialis5Node = {-0.07517,0.04256,0.09107}*.TF';
    AnyVec3 IliacusMedialis6Node = {-0.07797,0.02176,0.06801}*.TF';

    // ObturatorExternusInferior, Line (3 order) using 2 elements
    AnyVec3 ObturatorExternusInferior1Node = {-0.01270,-0.04004,-0.04599}*.TF';
    AnyVec3 ObturatorExternusInferior2Node = {0.00143,-0.04121,-0.05500}*.TF';

    // ObturatorExternusSuperior, LineArea (1 order) using 3 elements
    AnyVec3 ObturatorExternusSuperior3Node = {0.02995,-0.02076,-0.07377}*.TF';
    AnyVec3 ObturatorExternusSuperior2Node = {0.02641,-0.01239,-0.06355}*.TF';
    AnyVec3 ObturatorExternusSuperior1Node = {0.02338,-0.00470,-0.05241}*.TF';

    // ObturatorInternus, Area using 6 elements
    AnyVec3 ObturatorInternus5Node = {0.00540,-0.03414,-0.06107}*.TF';
    AnyVec3 ObturatorInternus6Node = {-0.02498,-0.03405,-0.04085}*.TF';
    AnyVec3 ObturatorInternus3Node = {0.01664,0.00353,-0.04450}*.TF';
    AnyVec3 ObturatorInternus4Node = {-0.02693,-0.00750,-0.03464}*.TF';
    AnyVec3 ObturatorInternus1Node = {-0.00230,0.02697,-0.02756}*.TF';
    AnyVec3 ObturatorInternus2Node = {-0.02568,0.02361,-0.02374}*.TF';

    // Pectineus, Line (2 order) using 4 elements
    AnyVec3 Pectineus1Node = {0.01600,0.02404,-0.02907}*.TF';
    AnyVec3 Pectineus2Node = {0.02206,0.01545,-0.03548}*.TF';
    AnyVec3 Pectineus3Node = {0.02832,0.00760,-0.04272}*.TF';
    AnyVec3 Pectineus4Node = {0.03589,0.00055,-0.04982}*.TF';

    // Piriformis, Point using 1 elements
    AnyVec3 Piriformis1Node = {-0.07157,0.05790,-0.05668}*.TF';

    // QuadratusFemoris, Line (1 order) using 4 elements
    AnyVec3 QuadratusFemoris1Node = {-0.02485,-0.03623,-0.01703}*.TF';
    AnyVec3 QuadratusFemoris2Node = {-0.02230,-0.04428,-0.02104}*.TF';
    AnyVec3 QuadratusFemoris3Node = {-0.02154,-0.05263,-0.02694}*.TF';
    AnyVec3 QuadratusFemoris4Node = {-0.02171,-0.06072,-0.03223}*.TF';

    // RectusFemorisMedialis, Point using 1 elements
    AnyVec3 RectusFemorisMedialis1Node = {0.02073,0.04280,0.01613}*.TF';

    // RectusFemorisLateralis, Point using 1 elements
    AnyVec3 RectusFemorisLateralis1Node = {-0.00784,0.03433,0.01127}*.TF';

    // Sartorius, Point using 1 elements
    AnyVec3 Sartorius1Node = {0.03195,0.07861,0.03261}*.TF';

    // Semimembranosus, Line (2 order) using 3 elements
    AnyVec3 Semimembranosus1Node = {-0.03832,-0.02761,-0.01548}*.TF';
    AnyVec3 Semimembranosus2Node = {-0.03401,-0.04298,-0.01490}*.TF';
    AnyVec3 Semimembranosus3Node = {-0.02710,-0.05677,-0.02439}*.TF';

    // Semitendinosus, Point using 1 elements
    AnyVec3 Semitendinosus1Node = {-0.04316,-0.05726,-0.03447}*.TF';

    // TensorFasciaeLatae, Line (2 order) using 2 elements
    AnyVec3 TensorFasciaeLatae2Node = {0.02942,0.08614,0.04266}*.TF';
    AnyVec3 TensorFasciaeLatae1Node = {0.02249,0.09155,0.04677}*.TF';

    // IliacusVia, ViaPoint using 1 elements
    //Manual Correction VC
    //AnyVec3 IliacusVia1Node = {0.01349,0.03289,-0.00155}*.TF';
    AnyVec3 IliacusVia1Node = {0.01849,0.03089,-0.00155}*.TF';

    // PsoasMajorVia, ViaPoint using 1 elements
    AnyVec3 PsoasMajorVia1Node = {0.01349,0.03289,-0.00155}*.TF';

    // ObturatorInternusVia, ViaPoint using 1 elements
    AnyVec3 ObturatorInternusVia1Node = {-0.04548,-0.01870,-0.03121}*.TF';


    /****TO BE CHECKED AND CORRECTED***/
    // IliacusMid, Area using 2 elements
    AnyVec3 IliacusMid1Node = {-0.02044,0.10574,0.02684}*.TF';

    // IliacusMid,  using NaN elements
    AnyVec3 IliacusMid2Node = {-0.02449,0.07658,-0.00223}*.TF';

    // IliacusMedialis, Area using 2 elements
    AnyVec3 IliacusMedialis1Node = {-0.04138,0.12323,0.00677}*.TF';

    // IliacusMedialis,  using NaN elements
    AnyVec3 IliacusMedialis2Node = {-0.04417,0.10243,-0.01629}*.TF';

  };

 AnyFolder Thigh = {
    AnyVec3 EpicondylusFemorisLateralis = {  -0.000000000000000,  -0.004310441121570, 0.040827812900271}*.TF';
    AnyVec3 EpicondylusFemorisMedialis = {-0.000000000000000, 0.004310441121570, -0.040827812900271}*.TF';

    // AdductorBrevisProximal, Line (1 order) using 2 elements
    AnyVec3 AdductorBrevisProximal1Node = {-0.00679,0.26827,0.02838}*.TF';
    AnyVec3 AdductorBrevisProximal2Node = {-0.00510,0.25768,0.02783}*.TF';

    // AdductorBrevisMid,  (1 order) using 2 elements
    AnyVec3 AdductorBrevisMid1Node = {-0.00364,0.24702,0.02712}*.TF';
    AnyVec3 AdductorBrevisMid2Node = {-0.00246,0.23627,0.02623}*.TF';

    // AdductorBrevisDistal,  (1 order) using 2 elements
    AnyVec3 AdductorBrevisDistal1Node = {-0.00172,0.22554,0.02503}*.TF';
    AnyVec3 AdductorBrevisDistal2Node = {-0.00071,0.21485,0.02402}*.TF';

    // AdductorLongus, Line (2 order) using 6 elements
    AnyVec3 AdductorLongus1Node = {0.00986,0.22586,0.01398}*.TF';
    AnyVec3 AdductorLongus2Node = {0.01069,0.20896,0.01208}*.TF';
    AnyVec3 AdductorLongus3Node = {0.01148,0.19249,0.01030}*.TF';
    AnyVec3 AdductorLongus4Node = {0.01219,0.17648,0.00845}*.TF';
    AnyVec3 AdductorLongus5Node = {0.01288,0.16090,0.00672}*.TF';
    AnyVec3 AdductorLongus6Node = {0.01351,0.14576,0.00506}*.TF';

    // AdductorMagnusDistal, Point using 1 elements
    AnyVec3 AdductorMagnusDistal1Node = {-0.01093,0.01454,-0.02939}*.TF';

    // AdductorMagnusMid, Line (2 order) using 6 elements
    AnyVec3 AdductorMagnusMid1Node = {-0.00577,0.24412,0.03348}*.TF';
    AnyVec3 AdductorMagnusMid2Node = {-0.00293,0.22074,0.02864}*.TF';
    AnyVec3 AdductorMagnusMid3Node = {-0.00120,0.19532,0.02397}*.TF';
    AnyVec3 AdductorMagnusMid4Node = {-0.00060,0.16799,0.01980}*.TF';
    AnyVec3 AdductorMagnusMid5Node = {-0.00040,0.13867,0.01578}*.TF';
    AnyVec3 AdductorMagnusMid6Node = { 0.00135,0.10782,0.01234}*.TF';

    // AdductorMagnusProximal, Line (1 order) using 4 elements
    AnyVec3 AdductorMagnusProximal4Node = {-0.00811,0.26684,0.03512}*.TF';
    AnyVec3 AdductorMagnusProximal3Node = {-0.01019,0.27710,0.03801}*.TF';
    AnyVec3 AdductorMagnusProximal2Node = {-0.01179,0.28741,0.04097}*.TF';
    AnyVec3 AdductorMagnusProximal1Node = {-0.01439,0.29772,0.04405}*.TF';

    // BicepsFemorisCaputBreve, Line (2 order) using 3 elements
    AnyVec3 BicepsFemorisCaputBreve1Node = {-0.00172,0.21961,0.02546}*.TF';
    AnyVec3 BicepsFemorisCaputBreve2Node = {-0.00067,0.16753,0.01767}*.TF';
    AnyVec3 BicepsFemorisCaputBreve3Node = {0.00122,0.10762,0.01337}*.TF';

    // GastrocnemiusLateralis, Point using 1 elements
    AnyVec3 GastrocnemiusLateralis1Node = {-0.00866,0.00494+0.005,0.03635}*.TF';

    // GastrocnemiusMedialis, Point using 1 elements
    AnyVec3 GastrocnemiusMedialis1Node = {-0.00851,0.01580,-0.02853}*.TF';

    // GemellusInferior, Point using 1 elements
    AnyVec3 GemellusInferior1Node = {-0.00752,0.34984,0.03214}*.TF';

    // GemellusSuperior, Point using 1 elements
    AnyVec3 GemellusSuperior1Node = {0.00321,0.35505,0.03253}*.TF';

    // GluteusMaximusInferior, Line (1 order) using 3 elements
    AnyVec3 GluteusMaximusInferior1Node = {-0.00843,0.25911,0.03790}*.TF';
    AnyVec3 GluteusMaximusInferior2Node = {-0.00843,0.25911,0.03790}*.TF';
    AnyVec3 GluteusMaximusInferior3Node = {-0.00403,0.23844,0.03590}*.TF';
    AnyVec3 GluteusMaximusInferior4Node = {-0.00403,0.23844,0.03590}*.TF';
    AnyVec3 GluteusMaximusInferior5Node = { 0.00015,0.21838,0.03321}*.TF';
    AnyVec3 GluteusMaximusInferior6Node = { 0.00015,0.21838,0.03321}*.TF';

    // GluteusMaximusSuperior, LineArea (1 order) using 3 elements
    AnyVec3 GluteusMaximusSuperior1Node = {-0.01170,0.28838,0.04548}*.TF';
    AnyVec3 GluteusMaximusSuperior2Node = {-0.01170,0.28838,0.04548}*.TF';
    AnyVec3 GluteusMaximusSuperior3Node = {-0.01046,0.28094,0.04338}*.TF';
    AnyVec3 GluteusMaximusSuperior4Node = {-0.01046,0.28094,0.04338}*.TF';
    AnyVec3 GluteusMaximusSuperior5Node = {-0.00953,0.27348,0.04108}*.TF';
    AnyVec3 GluteusMaximusSuperior6Node = {-0.00953,0.27348,0.04108}*.TF';


//    // GluteusMediusAnterior, Area using 6 elements
//    AnyVec3 GluteusMediusAnterior1Node = {0.00621,0.33932,0.06574}*.TF';
//    AnyVec3 GluteusMediusAnterior2Node = {0.01213,0.33856,0.06489}*.TF';
//    AnyVec3 GluteusMediusAnterior3Node = {0.00548,0.34890,0.06414}*.TF';
//    AnyVec3 GluteusMediusAnterior4Node = {0.01379,0.34658,0.06124}*.TF';
//    AnyVec3 GluteusMediusAnterior5Node = {0.00838,0.35579,0.05972}*.TF';
//    AnyVec3 GluteusMediusAnterior6Node = {0.01537,0.35358,0.05599}*.TF';
    // Manual Correction VC
    AnyVec3 GluteusMediusAnterior1Node = {0.00621-0.01,0.33932+0.01,0.06574}*.TF';
    AnyVec3 GluteusMediusAnterior2Node = {0.01213-0.01,0.33856+0.01,0.06489}*.TF';
    AnyVec3 GluteusMediusAnterior3Node = {0.00548-0.005,0.34890+0.005,0.06414}*.TF';
    AnyVec3 GluteusMediusAnterior4Node = {0.01379-0.005,0.34658+0.005,0.06124}*.TF';
    AnyVec3 GluteusMediusAnterior5Node = {0.00838,0.35579,0.05972}*.TF';
    AnyVec3 GluteusMediusAnterior6Node = {0.01537,0.35358,0.05599}*.TF';


    // GluteusMediusPosterior, Area using 6 elements
    AnyVec3 GluteusMediusPosterior2Node = {-0.00718,0.35174,0.06344}*.TF';
    AnyVec3 GluteusMediusPosterior1Node = {-0.01014,0.34942,0.06367}*.TF';
    AnyVec3 GluteusMediusPosterior4Node = {-0.01142,0.35907,0.05855}*.TF';
    AnyVec3 GluteusMediusPosterior3Node = {-0.01579,0.35539,0.05894}*.TF';
    AnyVec3 GluteusMediusPosterior6Node = {-0.01664,0.36185,0.05178}*.TF';
    AnyVec3 GluteusMediusPosterior5Node = {-0.01977,0.35915,0.05206}*.TF';

    // GluteusMinimusAnterior, LineArea (2 order) using 3 elements
    AnyVec3 GluteusMinimusAnterior1Node = {0.01716,0.32615,0.05160}*.TF';
    AnyVec3 GluteusMinimusAnterior2Node = {0.01716,0.32615,0.05160}*.TF';
    // GluteusMinimusMid,  using NaN elements
    AnyVec3 GluteusMinimusMid1Node = {0.01735,0.33517,0.05215}*.TF';
    AnyVec3 GluteusMinimusMid2Node = {0.01735,0.33517,0.05215}*.TF';
    // GluteusMinimusPosterior,  using NaN elements
    AnyVec3 GluteusMinimusPosterior1Node = {0.01593,0.34569,0.05230}*.TF';
    AnyVec3 GluteusMinimusPosterior2Node = {0.01593,0.34569,0.05230}*.TF';

    // Iliopsoas, LineArea (2 order) using 3 elements
    AnyVec3 Iliopsoas3Node = {-0.00963,0.29515,0.02220}*.TF';
    AnyVec3 Iliopsoas2Node = {-0.01139,0.30134,0.01690}*.TF';
    AnyVec3 Iliopsoas1Node = {-0.01551,0.30733,0.01332}*.TF';

    // ObturatorExternus, Point using 1 elements
    AnyVec3 ObturatorExternus1Node = {-0.01228,0.34359,0.03067}*.TF';

    // ObturatorInternus, Point using 1 elements
    AnyVec3 ObturatorInternus1Node = {-0.00001,0.35651,0.04529}*.TF';

    // Pectineus, Line (3 order) using 4 elements
    AnyVec3 Pectineus1Node = {-0.01239,0.28657,0.03165}*.TF';
    AnyVec3 Pectineus2Node = {-0.01002,0.27797,0.03517}*.TF';
    AnyVec3 Pectineus3Node = {-0.00821,0.26952,0.03433}*.TF';
    AnyVec3 Pectineus4Node = {-0.00708,0.26132,0.03340}*.TF';

    // Piriformis, Point using 1 elements
    AnyVec3 Piriformis1Node = {0.00153,0.36326,0.05249}*.TF';

    // Plantaris, Point using 1 elements
    AnyVec3 Plantaris1Node = {-0.00776,0.01220,0.03011}*.TF';

    // Popliteus, Line (2 order) using 3 elements
    AnyVec3 Popliteus1Node = {-0.01623,-0.02194,0.02249}*.TF';
    AnyVec3 Popliteus2Node = {-0.01477,-0.02348,0.02828}*.TF';
    AnyVec3 Popliteus3Node = {-0.01219,-0.02455,0.03346}*.TF';

    // QuadratusFemoris, Line (2 order) using 4 elements
    AnyVec3 QuadratusFemoris4Node = {-0.01767,0.31090,0.04680}*.TF';
    AnyVec3 QuadratusFemoris3Node = {-0.02434,0.32528,0.04640}*.TF';
    AnyVec3 QuadratusFemoris2Node = {-0.02468,0.33712,0.04391}*.TF';
    AnyVec3 QuadratusFemoris1Node = {-0.02018,0.34341,0.04217}*.TF';

    // VastusIntermedius, Area using 6 elements
    AnyVec3 VastusIntermedius5Node = {0.02900,0.11960,0.01242}*.TF';
    AnyVec3 VastusIntermedius6Node = {0.02021,0.11731,0.02719}*.TF';
    AnyVec3 VastusIntermedius3Node = {0.01259,0.20295,0.01122}*.TF';
    AnyVec3 VastusIntermedius4Node = {0.00202,0.19948,0.02964}*.TF';
    AnyVec3 VastusIntermedius2Node = {0.00307,0.27226,0.04922}*.TF';
    AnyVec3 VastusIntermedius1Node = {0.01612,0.27680,0.03078}*.TF';

    // VastusLateralisInferior, Line (2 order) using 6 elements
    AnyVec3 VastusLateralisInferior1Node = {-0.00799,0.28089,0.04663}*.TF';
    AnyVec3 VastusLateralisInferior2Node = {-0.00211,0.23091,0.03520}*.TF';
    AnyVec3 VastusLateralisInferior3Node = {0.00249,0.18389,0.02637}*.TF';
    AnyVec3 VastusLateralisInferior4Node = {0.00430,0.13948,0.02228}*.TF';
    AnyVec3 VastusLateralisInferior5Node = {0.00403,0.09823,0.02102}*.TF';
    AnyVec3 VastusLateralisInferior6Node = {0.00391,0.06017,0.02207}*.TF';

    // VastusLateralisSuperior, Line (2 order) using 2 elements
    AnyVec3 VastusLateralisSuperior1Node = {0.01584,0.33503,0.04286}*.TF';
    AnyVec3 VastusLateralisSuperior2Node = {-0.00461,0.31140,0.05643}*.TF';

    // VastusMedialisInferior, Line (3 order) using 4 elements
    AnyVec3 VastusMedialisMid1Node = {0.00086,0.20011,0.02082}*.TF';
    AnyVec3 VastusMedialisMid2Node = {0.00195,0.17032,0.01450}*.TF';

    AnyVec3 VastusMedialisInferior1Node = {0.00254,0.13959,0.01141}*.TF';
    AnyVec3 VastusMedialisInferior2Node = {0.00133,0.10576,0.01150}*.TF';

    // VastusMedialisSuperior, Line (2 order) using 4 elements
    AnyVec3 VastusMedialisSuperior1Node = {0.00951,0.31153,0.02639}*.TF';
    AnyVec3 VastusMedialisSuperior2Node = {-0.00162,0.30299,0.02059}*.TF';
    AnyVec3 VastusMedialisSuperior3Node = {-0.00459,0.28775,0.02312}*.TF';
    AnyVec3 VastusMedialisSuperior4Node = {-0.00349,0.26498,0.02467}*.TF';

    // SartoriusVia, Viapoint (3 order) using 6 elements
    AnyVar ang = 20;
    AnyVec3 SartoriusVia1Node = {0.051823  -0.01,    0.38614  ,  0.011768}*RotMat(ang*pi/180, y)*.TF';
    AnyVec3 SartoriusVia2Node = { 0.042187   ,   0.34  , 0.0017475}*RotMat(ang*pi/180, y)*.TF';
    AnyVec3 SartoriusVia3Node = {0.019481  +0.015    ,  0.2375    , -0.017538}*RotMat(ang*pi/180, y)*.TF';
    AnyVec3 SartoriusVia4Node = { -0.0064174  +0.015 ,    0.14503 ,    -0.025708}*RotMat(ang*pi/180, y)*.TF';
    AnyVec3 SartoriusVia5Node = {-0.020957   +0.015  , 0.078864   ,  -0.005 -0.027495}*RotMat(ang*pi/180, y)*.TF';
    AnyVec3 SartoriusVia6Node = {-0.025196    , 0.010221   ,  -0.040041}*RotMat(ang*pi/180, y)*.TF';

    // ObturatorExternusVia, Viapoint using 1 elements
    AnyVec3 ObturatorExternusVia1Node = {-0.015,0.338,0.01}*.TF';

    // GastrocnemiusLateralisVia, Viapoint (2 order) using 6 elements
    AnyVec3 GastrocnemiusLateralisVia1Node = {-0.01139,0.00266,0.03605}*.TF';
    AnyVec3 GastrocnemiusLateralisVia2Node = {-0.01585,0.00193,0.03506}*.TF';
    AnyVec3 GastrocnemiusLateralisVia3Node = {-0.01957,0.00056,0.03377}*.TF';
    AnyVec3 GastrocnemiusLateralisVia4Node = {-0.02292,-0.00172,0.03230}*.TF';
    AnyVec3 GastrocnemiusLateralisVia5Node = {-0.02445,-0.00464,0.03107}*.TF';
    AnyVec3 GastrocnemiusLateralisVia6Node = {-0.02474,-0.00808,0.02890}*.TF';

    // GastrocnemiusMedialisVia, Viapoint (3 order) using 3 elements
    AnyVec3 GastrocnemiusMedialisVia3Node = {-0.02932,-0.00208,-0.01697}*.TF';
    AnyVec3 GastrocnemiusMedialisVia2Node = {-0.02320,0.00650,-0.01785}*.TF';
    AnyVec3 GastrocnemiusMedialisVia1Node = {-0.01276,0.01103,-0.01670}*.TF';

    AnyVec3 HipJointNode = {-66.88629,-149.88357,-321.49101}*.TF';
  };


 AnyFolder Patella = {
    AnyVec3 EpicondylusFemorisLateralis = {-0.042092976174922, -0.018024839755155,  -0.038781795481504}*.TF';
    AnyVec3 EpicondylusFemorisMedialis = {-0.042092976174922,  -0.009403957512015,   0.042873830319038}*.TF';
    AnyVec3 Origin_patella_tendon = {0.006867077185266, -0.015235215526958, -0.000738033888764}*.TF';
//    AnyVec3 RectusFemoris1Node = {0.05303,-0.36093,0.00097}*.TF';
//    AnyVec3 RectusFemoris2Node = {0.05227,-0.36011,0.01258}*.TF';
//    AnyVec3 VastusIntermedius1Node = {0.05303,-0.36093,0.00097}*.TF';
//    AnyVec3 VastusIntermedius2Node = {0.05303,-0.36093,0.00097}*.TF';
//    AnyVec3 VastusIntermedius3Node = {0.05303,-0.36093,0.00097}*.TF';
//    AnyVec3 VastusIntermedius4Node = {0.05227,-0.36011,0.01258}*.TF';
//    AnyVec3 VastusIntermedius5Node = {0.05227,-0.36011,0.01258}*.TF';
//    AnyVec3 VastusIntermedius6Node = {0.05227,-0.36011,0.01258}*.TF';
//    AnyVec3 VastusLateralisInferior1Node = {0.05227,-0.36011,0.01258}*.TF';
//    AnyVec3 VastusLateralisInferior2Node = {0.05227,-0.36011,0.01258}*.TF';
//    AnyVec3 VastusLateralisInferior3Node = {0.05227,-0.36011,0.01258}*.TF';
//    AnyVec3 VastusLateralisInferior4Node = {0.05227,-0.36011,0.01258}*.TF';
//    AnyVec3 VastusLateralisInferior5Node = {0.05227,-0.36011,0.01258}*.TF';
//    AnyVec3 VastusLateralisInferior6Node = {0.05227,-0.36011,0.01258}*.TF';
//    AnyVec3 VastusLateralisSuperior1Node = {0.05227,-0.36011,0.01258}*.TF';
//    AnyVec3 VastusLateralisSuperior2Node = {0.05227,-0.36011,0.01258}*.TF';
//    AnyVec3 VastusMedialisInferior1Node = {0.05303,-0.36093,0.00097}*.TF';
//    AnyVec3 VastusMedialisInferior2Node = {0.05303,-0.36093,0.00097}*.TF';
//    AnyVec3 VastusMedialisMid1Node = {0.05303,-0.36093,0.00097}*.TF';
//    AnyVec3 VastusMedialisMid2Node = {0.05303,-0.36093,0.00097}*.TF';
//    AnyVec3 VastusMedialisSuperior1Node = {0.05303,-0.36093,0.00097}*.TF';
//    AnyVec3 VastusMedialisSuperior2Node = {0.05303,-0.36093,0.00097}*.TF';
//    AnyVec3 VastusMedialisSuperior3Node = {0.05303,-0.36093,0.00097}*.TF';
//    AnyVec3 VastusMedialisSuperior4Node = {0.05303,-0.36093,0.00097}*.TF';
//    AnyVec3 VastusMedialisSuperior5Node = {0.05303,-0.36093,0.00097}*.TF';
//    AnyVec3 VastusMedialisSuperior6Node = {0.05303,-0.36093,0.00097}*.TF';

    // RectusFemoris, Line (2 order) using 2 elements
    AnyVec3 RectusFemorisLateralis1Node = {0.00397,0.01249, 0.00462}*.TF';
    AnyVec3 RectusFemorisMedialis1Node ={0.00290,0.01391,- 0.00732}*.TF';

    // VastusLateralisInferior, Line (3 order) using 3 elements
    AnyVec3 VastusLateralisInferior3Node = {0.00042,-0.00694,0.01884}*.TF';
    AnyVec3 VastusLateralisInferior2Node = {0.00108,0.00089,0.02200}*.TF';
    AnyVec3 VastusLateralisInferior1Node = {0.00083,0.00713,0.02075}*.TF';

    // VastusLateralisSuperior, Point using 1 elements
    AnyVec3 VastusLateralisSuperior1Node = {0.00391,0.01007,0.01535}*.TF';

    // VastusMedialisInferior, Line (3 order) using 2 elements
    AnyVec3 VastusMedialisMid1Node = {-0.00294,0.01136,-0.01534}*.TF';
    AnyVec3 VastusMedialisInferior1Node = {-0.00094,0.00164,-0.01873}*.TF';

    // VastusMedialisSuperior, Point using 1 elements
    AnyVec3 VastusMedialisSuperior1Node = {0.00145,0.01251,-0.01563}*.TF';

  };

  AnyFolder Shank = {
    AnyVec3 MedialMalleolus = {0.017065441344676, 0.004967186589899, -0.027608399085015}*.TF';
    AnyVec3 LateralMalleolus = {-0.017065441344676,  -0.004967186589900,   0.027608399085015}*.TF';
    AnyVec3 MedialTibialEpicondyle = {0, 0.321463224672736, -0.038645847149671}*.TF';
    AnyVec3 LateralTibialEpicondyle = {0, 0.319398338284877, 0.038645847149671}*.TF';
    AnyVec3 EpicondylusFemorisLateralis = {0.000370957510065,  0.360085611549568,   0.035632738850267}*.TF';
    AnyVec3 EpicondylusFemorisMedialis = {0.006595773518830,  0.363778309043427,  -0.046157092341660}*.TF';
    AnyVec3 TibialTuberosity = {0.032171160650425,   0.274763256123998,  0.009788268180715}*.TF';
    AnyVec3 FibularHead  = {-0.028327618118351,   0.319739226657290,   0.031814278337036}*.TF';

    // BicepsFemoris, Point using 1 el0.017065441344676   0.004967186589899  -0.027608399085015ements
    AnyVec3 BicepsFemoris1Node = {-0.02252,0.31306,0.03954}*.TF';

    // ExtensorDigitorumLongus, Line (2 order) using 3 elements
    AnyVec3 ExtensorDigitorumLongus1Node = { 0.00565,0.30732,0.02794}*.TF';
    AnyVec3 ExtensorDigitorumLongus2Node = {-0.01721,0.21765,0.02381}*.TF';
    AnyVec3 ExtensorDigitorumLongus3Node = {-0.01402,0.09700,0.02065}*.TF';
    AnyVec3 ExtensorDigitorumLongus4Node = {-0.01402,0.09700,0.02065}*.TF';

    // ExtensorHallucisLongus, Line (3 order) using 3 elements
    AnyVec3 ExtensorHallucisLongus1Node = {-0.01910,0.21283,0.01896}*.TF';
    AnyVec3 ExtensorHallucisLongus2Node = {-0.01373,0.13964,0.01345}*.TF';
    AnyVec3 ExtensorHallucisLongus3Node = {-0.00963,0.08052,0.01333}*.TF';

    // FlexorDigitorumLongus, LineArea (3 order) using 3 elements
    AnyVec3 FlexorDigitorumLongus4Node = {-0.00050,0.12931,-0.00108}*.TF';
    AnyVec3 FlexorDigitorumLongus3Node = {-0.00050,0.12931,-0.00108}*.TF';
    AnyVec3 FlexorDigitorumLongus2Node = {-0.00009,0.18162,-0.00427}*.TF';
    AnyVec3 FlexorDigitorumLongus1Node = {-0.00208,0.23212, 0.00137}*.TF';

    // FlexorHallucisLongus, Line (2 order) using 3 elements
    AnyVec3 FlexorHallucisLongus1Node = {-0.02731,0.20329,0.01594}*.TF';
    AnyVec3 FlexorHallucisLongus2Node = {-0.02034,0.12716,0.01041}*.TF';
    AnyVec3 FlexorHallucisLongus3Node = {-0.01039,0.05536,0.01121}*.TF';

    // Gracilis, Point using 1 elements
    AnyVec3 Gracilis1Node = {0.02047,0.28263,-0.00681}*.TF';

    // Insertion_patella_tendon, Point using 1 elements
    AnyVec3 Insertion_patella_tendon = {0.03210,0.29316,0.01144}*.TF';

    // PeroneusBrevis, Line (3 order) using 3 elements
    AnyVec3 PeroneusBrevis3Node = {-0.01592,0.03615,0.01474}*.TF';
    AnyVec3 PeroneusBrevis2Node = {-0.02008,0.12226,0.01984}*.TF';
    AnyVec3 PeroneusBrevis1Node = {-0.01950,0.19345,0.02392}*.TF';

    // PeroneusLongus, Line (3 order) using 3 elements
    AnyVec3 PeroneusLongus3Node = {-0.02588,0.16304,0.02012}*.TF';
    AnyVec3 PeroneusLongus2Node = {-0.02396,0.23465,0.02721}*.TF';
    AnyVec3 PeroneusLongus1Node = {-0.01688,0.29115,0.03256}*.TF';

    // Popliteus, LineArea (3 order) using 3 elements
    AnyVec3 Popliteus3Node = {0.00092,0.22854,-0.01291}*.TF';
    AnyVec3 Popliteus2Node = {-0.00218,0.26089,-0.00955}*.TF';
    AnyVec3 Popliteus1Node = {-0.00475,0.28125,-0.00658}*.TF';

    // Sartorius, Point using 1 elements
    AnyVec3 Sartorius1Node = {0.01796,0.29020,-0.01085}*.TF';

    // Semimembranosus, Line (2 order) using 3 elements
    AnyVec3 Semimembranosus1Node = {-0.02054,0.31458,-0.01617}*.TF';
    AnyVec3 Semimembranosus2Node = {-0.01521,0.31218,-0.02770}*.TF';
    AnyVec3 Semimembranosus3Node = {-0.00644,0.31340,-0.03297}*.TF';

    // Semitendinosus, Point using 1 elements
    AnyVec3 Semitendinosus1Node = {0.01942,0.27145,-0.00743}*.TF';

    // SoleusLateralis, Line (2 order) using 3 elements
    AnyVec3 SoleusLateralis1Node = {-0.02800,0.29987,0.02729}*.TF';
    AnyVec3 SoleusLateralis2Node = {-0.02813,0.25003,0.02253}*.TF';
    AnyVec3 SoleusLateralis3Node = {-0.02698,0.18321,0.01689}*.TF';

    // SoleusMedialis, Line (3 order) using 3 elements
    AnyVec3 SoleusMedialis3Node = {0.00378,0.19825,-0.01310}*.TF';
    AnyVec3 SoleusMedialis2Node = {0.00113,0.22050,-0.01218}*.TF';
    AnyVec3 SoleusMedialis1Node = {-0.00360,0.24540,-0.00375}*.TF';

    // TensorFasciaeLatae, Point using 1 elements
    AnyVec3 TensorFasciaeLatae1Node = {0.01568,0.32738,0.03194}*.TF';

    // TibialisAnterior, LineArea (2 order) using 3 elements
    AnyVec3 TibialisAnterior3Node = {0.00786,0.13667,0.00912}*.TF';
    AnyVec3 TibialisAnterior2Node = {0.01150,0.21214,0.00949}*.TF';
    AnyVec3 TibialisAnterior1Node = {0.01253,0.27569,0.01594}*.TF';

    // TibialisPosteriorLateralis, Line (2 order) using 3 elements
    AnyVec3 TibialisPosteriorLateralis1Node = {-0.02198,0.26428,0.02075}*.TF';
    AnyVec3 TibialisPosteriorLateralis2Node = {-0.02280,0.19286,0.01283}*.TF';
    AnyVec3 TibialisPosteriorLateralis3Node = {-0.01587,0.10849,0.00943}*.TF';

    // TibialisPosteriorMedialis, Line (2 order) using 3 elements
    AnyVec3 TibialisPosteriorMedialis1Node = {-0.00128,0.27674,0.01142}*.TF';
    AnyVec3 TibialisPosteriorMedialis2Node = {0.00258,0.20455,0.00749}*.TF';
    AnyVec3 TibialisPosteriorMedialis3Node = {0.00237,0.11025,0.00752}*.TF';

    // ExtensorDigitorumLongusVia, Viapoint (2 order) using 4 elements
    AnyVec3 ExtensorDigitorumLongusViaNode1 = {0.01858,0.00757,0.01443}*.TF';
    AnyVec3 ExtensorDigitorumLongusViaNode2 = {0.02043,0.00455,0.01356}*.TF';
    AnyVec3 ExtensorDigitorumLongusViaNode3 = {0.02315,0.00072,0.01456}*.TF';
    AnyVec3 ExtensorDigitorumLongusViaNode4 = {0.02675,-0.00390,0.01741}*.TF';

    // ExtensorHallucisLongusVia, Viapoint (2 order) using 3 elements
    AnyVec3 ExtensorHallucisLongusViaNode1 = {0.02380,0.01079,0.00865}*.TF';
    AnyVec3 ExtensorHallucisLongusViaNode2 = {0.02804,0.00333,0.00544}*.TF';
    AnyVec3 ExtensorHallucisLongusViaNode3 = {0.03222,-0.00101,0.00544}*.TF';

    // FlexorDigitorumLongusVia, Viapoint (3 order) using 6 elements
    AnyVec3 FlexorDigitorumLongusViaNode1 = {-0.00071,0.00933,-0.02222}*.TF';
    AnyVec3 FlexorDigitorumLongusViaNode2 = {-0.00031,0.00766,-0.02322}*.TF';
    AnyVec3 FlexorDigitorumLongusViaNode3 = {0.00163,0.00368,-0.02351}*.TF';
    AnyVec3 FlexorDigitorumLongusViaNode4 = {0.00461,-0.00144,-0.02314}*.TF';
    AnyVec3 FlexorDigitorumLongusViaNode5 = {0.00815,-0.00655,-0.02214}*.TF';
    AnyVec3 FlexorDigitorumLongusViaNode6 = {0.01173,-0.01049,-0.02055}*.TF';

    // FlexorHallucisLongusVia, Viapoint (2 order) using 6 elements
    AnyVec3 FlexorHallucisLongusViaNode1 = {-0.00514,0.00265,-0.01064}*.TF';
    AnyVec3 FlexorHallucisLongusViaNode2 = {-0.00495,-0.00224,-0.01029}*.TF';
    AnyVec3 FlexorHallucisLongusViaNode3 = {-0.00463,-0.00670,-0.01027}*.TF';
    AnyVec3 FlexorHallucisLongusViaNode4 = {-0.00417,-0.01073,-0.01057}*.TF';
    AnyVec3 FlexorHallucisLongusViaNode5 = {-0.00357,-0.01432,-0.01120}*.TF';
    AnyVec3 FlexorHallucisLongusViaNode6 = {-0.00284,-0.01747,-0.01215}*.TF';

    // PeroneusBrevisVia, Viapoint (3 order) using 3 elements
    AnyVec3 PeroneusBrevisViaNode3 = {-0.01481,-0.01400,0.02261}*.TF';
    AnyVec3 PeroneusBrevisViaNode2 = {-0.01912,-0.00904,0.02248}*.TF';
    AnyVec3 PeroneusBrevisViaNode1 = {-0.01900,-0.00216,0.02239}*.TF';

    // PeroneusLongusVia, Viapoint (2 order) using 4 elements
    AnyVec3 PeroneusLongusViaNode1 = {-0.01599,-0.01128,0.02010}*.TF';
    AnyVec3 PeroneusLongusViaNode2 = {-0.01408,-0.01409,0.02033}*.TF';
    AnyVec3 PeroneusLongusViaNode3 = {-0.01350,-0.01624,0.02054}*.TF';
    AnyVec3 PeroneusLongusViaNode4 = {-0.01425,-0.01773,0.02070}*.TF';

    // TibialisAnteriorVia, Viapoint using 1 elements
    AnyVec3 TibialisAnteriorViaNode1 = {0.03221,0.00648,-0.00050}*.TF';

    // TibialisPosteriorVia, Viapoint (2 order) using 4 elements
    AnyVec3 TibialisPosteriorViaNode1 = {0.00248,0.00941,-0.02552}*.TF';
    AnyVec3 TibialisPosteriorViaNode2 = {0.00704,0.00146,-0.02628}*.TF';
    AnyVec3 TibialisPosteriorViaNode3 = {0.01252,-0.00636,-0.02496}*.TF';
    AnyVec3 TibialisPosteriorViaNode4 = {0.01891,-0.01407,-0.02156}*.TF';

    // GracilisVia, Viapoint (2 order) using 3 elements
    AnyVec3 GracilisViaNode1 = {-0.01316,0.31812,-0.03736}*.TF';
    AnyVec3 GracilisViaNode2 = {-0.01079,0.31117,-0.03469}*.TF';
    AnyVec3 GracilisViaNode3 = {-0.00621,0.30449,-0.03171}*.TF';

    // SemitendinosusVia, Viapoint using 1 elements
    AnyVec3 SemitendinosusViaNode1 = {-0.01540,0.31325,-0.03226}*.TF';

    // PopliteusVia, Viapoint using 1 elements
    AnyVec3 PopliteusViaNode1 = {-0.02066,0.32277,0.01451}*.TF';

       // GastrocnemiusLateralisVia, Viapoint (2 order) using 4 elements
    AnyVec3 GastrocnemiusLateralis7ViaNode = {-0.03847,0.30833,0.01390}*.TF';
    AnyVec3 GastrocnemiusLateralis8ViaNode = {-0.04509,0.26850,0.01016}*.TF';
    AnyVec3 GastrocnemiusLateralis9ViaNode = {-0.04810,0.21809,0.00598}*.TF';
    AnyVec3 GastrocnemiusLateralis10ViaNode = {-0.04748,0.15711,0.00138}*.TF';

    // GastrocnemiusMedialisVia,  (2 order) using 6 elements
    AnyVec3 GastrocnemiusMedialis4ViaNode = {-0.03310,0.30075,-0.01802}*.TF';
    AnyVec3 GastrocnemiusMedialis5ViaNode = {-0.03395,0.26145,-0.02239}*.TF';
    AnyVec3 GastrocnemiusMedialis6ViaNode = {-0.03433,0.22333,-0.02427}*.TF';
    AnyVec3 GastrocnemiusMedialis7ViaNode = {-0.03426,0.18640,-0.02367}*.TF';
    AnyVec3 GastrocnemiusMedialis8ViaNode = {-0.03372,0.15066,-0.02059}*.TF';
    AnyVec3 GastrocnemiusMedialis9ViaNode = {-0.03271,0.11610,-0.01503}*.TF';

    AnyVec3 SartoriusVia1Node = {-0.006668463738826   ,0.318659379478723 , -0.037092713313338}*.TF';
    AnyVec3 SartoriusVia2Node = {  -0.003654893482948 ,  0.309695467910520,  -0.034995576286264}*.TF';
    AnyVec3 SartoriusVia3Node = { -0.000420611395851 ,  0.303302262988060,  -0.032113675836818}*.TF';

  };

   AnyFolder Talus = {
    AnyVec3 MedialMalleolus = {0.02022,0.01028,-0.03249}*.TF';
    AnyVec3 LateralMalleolus = {-0.02016,-0.01038,0.03255}*.TF';
    AnyVec3 MedialTibialEpicondyle = {0.00004,0.36417,-0.04276}*.TF';
    AnyVec3 LateralTibialEpicondyle = {0.00005,0.36910,0.04280}*.TF';
    AnyVec3 MedialAnkleAxisMarker = {-0.00927,-0.01061,-0.03967}*.TF';
    AnyVec3 LateralAnkleAxisMarker = {-0.02080,-0.01945,0.03259}*.TF';

  };

  //This is the unscaled length of the patellar ligament, this length is used to constrain the patella motion
  AnyVar PatellarLigamentLength = 0.0605;

   AnyFolder Foot = {

// Metatarsal1ContactNode, point using 1 elements
    AnyVec3 Metatarsal1Contact = {0.1219,  -0.0491,   -0.0196}*.TF';

    // Metatarsal5ContactNode, point using 1 elements
    AnyVec3 Metatarsal5Contact = {0.0979, -0.0491, 0.0330}*.TF';

    // HeelContactNode, point using 1 elements
    AnyVec3 HeelContactNode1Node = {-0.0261,   -0.0491 ,  -0.0021}*.TF';

    // Metatarsal2Joint, point using 1 elements
    AnyVec3 Metatarsal2Joint = {0.1139,  -0.0491, -0.0021}*.TF';


    AnyVec3 BigToeNode = {0.1741 + 0.013   , -0.0408 - 0.01 , -0.0060 +0.005}*.TF';
    AnyVec3 HeelNode = {0.0205 ,  -0.0198  , -0.0403 -  0.0173}*.TF';
    AnyVec3 ToeMedialContactNode = {0.1219 + 0.045,  -0.0491 + 0.005,   -0.0196-0.005}*.TF';
    AnyVec3 ToeLateralContactNode = {0.0979 + 0.035, -0.0491 + 0.005, 0.0330+0.008}*.TF';
    AnyVec3 HeelContactNodeLow = HeelContactNode1Node;

    AnyVec3 MedialMalleolusInNeutralConf = MedialMalleolus;
    AnyVec3 LateralMalleolusInNeutralConf = LateralMalleolus;
    AnyVec3 LateralTibialCondyleInNeutralConf = MedialTibialEpicondyle;
    AnyVec3 MedialTibialCondyleInNeutralConf = LateralTibialEpicondyle;

    AnyVec3 MedialMalleolus = {0.02022,0.01028,-0.03249}*.TF'+{-0.0000 ,   0.0278 ,  -0.0014}*.TF';
    AnyVec3 LateralMalleolus = {-0.02016,-0.01038,0.03255}*.TF'+{-0.0000 ,   0.0278 ,  -0.0014}*.TF';
    AnyVec3 MedialTibialEpicondyle = {0.00004,0.36417,-0.04276}*.TF'+{-0.0000 ,   0.0278 ,  -0.0014}*.TF';
    AnyVec3 LateralTibialEpicondyle = {0.00005,0.36910,0.04280}*.TF'+{-0.0000 ,   0.0278 ,  -0.0014}*.TF';


    // TendonCalcaneousNode, Point using 1 elements
    AnyVec3 TendonCalcaneousNode = {-0.03679,-0.01718,-0.00514}*.TF';
    AnyVec3 TendonCalcaneousMedialisNode  = TendonCalcaneousNode-{0, 0,0.005}*.TF';
    AnyVec3 TendonCalcaneousLateralisNode = TendonCalcaneousNode+{0, 0,0.005}*.TF';
    AnyVec3 GastrocnemiusLateralis1Node = TendonCalcaneousLateralisNode;
    AnyVec3 GastrocnemiusMedialis1Node =  TendonCalcaneousMedialisNode;
    AnyVec3 Plantaris1Node = TendonCalcaneousNode;
    AnyVec3 SoleusMedialis1Node = TendonCalcaneousMedialisNode;
    AnyVec3 SoleusMedialis2Node = TendonCalcaneousMedialisNode;
    AnyVec3 SoleusMedialis3Node =  TendonCalcaneousMedialisNode;
    AnyVec3 SoleusLateralis1Node = TendonCalcaneousLateralisNode;
    AnyVec3 SoleusLateralis2Node = TendonCalcaneousLateralisNode;
    AnyVec3 SoleusLateralis3Node = TendonCalcaneousLateralisNode;

    // PeroneusBrevisDistal, Point using 1 elements
    AnyVec3 PeroneusBrevisDistal1Node = {0.04494,-0.02783,0.03219}*.TF';

    // PeroneusBrevisProximal, Point using 1 elements
    AnyVec3 PeroneusBrevisProximal1Node = {0.10508,-0.04435,0.03364}*.TF';

    // PeroneusLongus, Point using 1 elements
    AnyVec3 PeroneusLongus1Node = {0.08292,-0.01936,-0.00997}*.TF';

    // TibialisAnteriorDistal, Point using 1 elements
    AnyVec3 TibialisAnteriorDistal1Node = {0.06649,-0.02515,-0.02191}*.TF';

    // TibialisAnteriorProximal, Point using 1 elements
    AnyVec3 TibialisAnteriorProximal1Node = {0.07628,-0.02512,-0.01172}*.TF';

    // TibialisPosterior, Point using 1 elements
    AnyVec3 TibialisPosterior1Node = {0.04489,-0.01477,-0.02404}*.TF';

    // ExtensorDigitorumLongus2, Point using 1 elements
    AnyVec3 ExtensorDigitorumLongus1Node = {0.17395,-0.04189,0.01317}*.TF';
    AnyVec3 ExtensorDigitorumLongus2Node = {0.16922,-0.04202,0.02498}*.TF';
    AnyVec3 ExtensorDigitorumLongus3Node = {0.16016,-0.04209,0.03502}*.TF';
    AnyVec3 ExtensorDigitorumLongus4Node = {0.14504,-0.04263,0.04140}*.TF';

    // ExtencorHallucisLongus, Point using 1 elements
    AnyVec3 ExtensorHallucisLongus1Node = {0.17139,-0.03638,-0.01176}*.TF';

    // FlexorDigitorumLongus2, Point using 1 elements
    AnyVec3 FlexorDigitorumLongus1Node = {0.17072,-0.04781,0.01191}*.TF';
    AnyVec3 FlexorDigitorumLongus2Node = {0.16725,-0.04775,0.02419}*.TF';
    AnyVec3 FlexorDigitorumLongus3Node = {0.15795,-0.04771,0.03348}*.TF';
    AnyVec3 FlexorDigitorumLongus4Node = {0.14244,-0.04648,0.04012}*.TF';

       // FlexorHallucisLongus, Point using 1 elements
    AnyVec3 FlexorHallucisLongus1Node = {0.16693,-0.04508,-0.01198}*.TF';

    // ExtensorDigitorumViaPoint2, Viapoint using 1 elements
    AnyVec3 ExtensorDigitorumViaNode1 = {0.12646,-0.02591,0.00071}*.TF';
    AnyVec3 ExtensorDigitorumViaNode2 = {0.12431,-0.02753,0.01194}*.TF';
    AnyVec3 ExtensorDigitorumViaNode3 = {0.11786,-0.03093,0.02267}*.TF';
    AnyVec3 ExtensorDigitorumViaNode4 = {0.10859,-0.03239,0.03430}*.TF';

    // ExtensorHallucisLongus1, Viapoint using 1 elements
   // AnyVec3 ExtensorHallucisLongus1Node = {0.12728,-0.02267,-0.02164}*.TF';

    // FlexorDigitorumViaPoint2, Viapoint using 1 elements
//    AnyVec3 FlexorDigitorumViaNode1 = {0.12457,-0.03854,-0.00204}*.TF';
//    AnyVec3 FlexorDigitorumViaNode2 = {0.12269,-0.03969,0.00849}*.TF';
//    AnyVec3 FlexorDigitorumViaNode3 = {0.11602,-0.04305,0.01900}*.TF';
//    AnyVec3 FlexorDigitorumViaNode4 = {0.10687,-0.04417,0.03055}*.TF';

    // FlexorHallucisViaPoint1, Viapoint using 1 elements
  //  AnyVec3 FlexorHallucisViaPoint1Node = {0.12585,-0.03978,-0.01803}*.TF';

    // ExtensorDigitorumSplitPoint, Viapoint using 1 elements
    AnyVec3 ExtensorDigitorumSplitPoint1Node = {0.04651,0.01235,-0.00180}*.TF';

    // ExtensorHallucisViaPont1, Viapoint using 1 elements
    AnyVec3 ExtensorHallucisLongusViaNode4 = {0.05156,0.01481,-0.01398}*.TF';

    // ExtensorDigitorumLongusViaPoint, Viapoint using 1 elements
    AnyVec3 ExtensorDigitorumLongusViaNode5 = {0.02443,0.01799,-0.00174}*.TF';

    // FlexorDigitorumLongusViaPoint, Viapoint (2 order) using 2 elements
    AnyVec3 FlexorDigitorumLongusViaNode1 = {0.01189,-0.00657,-0.02966}*.TF';
    AnyVec3 FlexorDigitorumLongusViaNode2 = {0.01725,-0.00771,-0.02803}*.TF';

    // FlexorHallucisLongusViaPoint, Viapoint using 1 elements
    AnyVec3 FlexorHallucisLongusViaNode1 = {-0.00459,0.00114,-0.02048}*.TF';

    // PeroneusBrevisViaPoint, Viapoint using 1 elements
    AnyVec3 PeroneusBrevisViaNode4 = {-0.00411,0.00868,0.01552}*.TF';

    // PeroneusBrevisSplitPoint, Viapoint using 1 elements
    AnyVec3 PeroneusBrevisSplitPoint1Node = {0.03351,-0.01785,0.02532}*.TF';

    // PeroneusLongusViaPoint1, Viapoint using 1 elements
    AnyVec3 PeroneusLongusViaNode1 = {-0.00342,0.00126,0.01741}*.TF';
    AnyVec3 PeroneusLongusViaNode2 = {0.00962,-0.01494,0.02008}*.TF';
    AnyVec3 PeroneusLongusViaNode3 = {0.04096,-0.02919,0.01887}*.TF';

    // TibialisAnteriorViaPoint, Viapoint using 1 elements
    AnyVec3 TibialisAnteriorViaNode1 = {0.03967,0.01383,-0.02391}*.TF';

    // TibialisPosteriorViaPoint, Viapoint (2 order) using 3 elements
    AnyVec3 TibialisPosteriorViaNode3 = {0.01795,-0.00110,-0.03315}*.TF';
    AnyVec3 TibialisPosteriorViaNode2 = {0.01331,0.00573,-0.03424}*.TF';
    AnyVec3 TibialisPosteriorViaNode1 = {0.00929,0.01141,-0.03534}*.TF';
   };

//
//  AnyFolder Foot = {
//
//
//
//    AnyMat33 NeutralRot = RotMat(..Sign*-0*pi/180,y);
//    AnyMat33 NeutralRot2 = RotMat(..Sign*15*pi/180,y);
//    AnyVec3 BigToeNode = {0.17510,-0.09625,0.07775}*.TF'*NeutralRot;
//    AnyVec3 ToeMedialContactNode = {0.15106,-0.09857,0.04848}*.TF'*NeutralRot;
//    AnyVec3 ToeLateralContactNode = {0.08444,-0.07775,0.11308}*.TF'*NeutralRot;
//    AnyVec3 HeelContactNodeLow = {-0.08934,-0.10268,0.02116}*.TF'*NeutralRot;
//    AnyVec3 HeelNode = {-0.07001,-0.07916,0.00184}*.TF'*NeutralRot;
//    AnyVec3 MedialMalleolusInNeutralConf = {0.01297,0.00007,-0.01891}*.TF'*NeutralRot;
//    AnyVec3 LateralMalleolusInNeutralConf = {-0.03823,-0.00801,0.04110}*.TF'*NeutralRot;
//    AnyVec3 MedialFemuralCondyleInNeutralConf = {-0.01189,0.36560,-0.14864}*.TF'*NeutralRot;
//    AnyVec3 LateralFemuralCondyleInNeutralConf = {-0.02467,0.39677,-0.05664}*.TF'*NeutralRot;
//    AnyVec3 LateralTibialCondyleInNeutralConf = {-0.02677,0.36148,-0.04986}*.TF'*NeutralRot;
//    AnyVec3 MedialTibialCondyleInNeutralConf = {-0.00914,0.32984,-0.12793}*.TF'*NeutralRot;
//    AnyVec3 MedialAnkleAxisMarkerInNeutralConf = {-0.01218,-0.02617,-0.02566}*.TF'*NeutralRot;
//    AnyVec3 LateralAnkleAxisMarkerInNeutralConf = {-0.03835,-0.01647,0.04257}*.TF'*NeutralRot;
//    AnyVec3 GroundJoint = {0.03508,-0.09985,0.05749}*.TF'*NeutralRot;
////    AnyVec3 ExtensorDigitorumLongus1Node = {0.13157,-0.08908,0.07450}*.TF'*NeutralRot;
////    AnyVec3 ExtensorDigitorumLongus2Node = {0.13157,-0.08908,0.07450}*.TF'*NeutralRot;
////    AnyVec3 ExtensorDigitorumLongus3Node = {0.13157,-0.08908,0.07450}*.TF'*NeutralRot;
////    AnyVec3 ExtensorDigitorumLongusViaNode5 = {0.01091,-0.01670,0.04394}*.TF'*NeutralRot;
////    AnyVec3 ExtensorHallucisLongus1Node = {0.15366,-0.06331,0.03117}*.TF'*NeutralRot;
////    AnyVec3 ExtensorHallucisLongus2Node = {0.15366,-0.06331,0.03117}*.TF'*NeutralRot;
////    AnyVec3 ExtensorHallucisLongus3Node = {0.15366,-0.06331,0.03117}*.TF'*NeutralRot;
////    AnyVec3 ExtensorHallucisLongusViaNode7 = {0.04789,-0.01754,0.02764}*.TF'*NeutralRot;
////    AnyVec3 ExtensorHallucisLongusViaNode8 = {0.05945,-0.02324,0.02503}*.TF'*NeutralRot;
////    AnyVec3 FlexorDigitorumLongus1Node = {0.13295,-0.09576,0.06733}*.TF'*NeutralRot;
////    AnyVec3 FlexorDigitorumLongus2Node = {0.13295,-0.09576,0.06733}*.TF'*NeutralRot;
////    AnyVec3 FlexorDigitorumLongus3Node = {0.13295,-0.09576,0.06733}*.TF'*NeutralRot;
////    AnyVec3 FlexorDigitorumLongusViaNode7 = {0.00995,-0.04489,0.00296}*.TF'*NeutralRot;
////    AnyVec3 FlexorDigitorumLongusViaNode8 = {0.01317,-0.04768,0.00641}*.TF'*NeutralRot;
////    AnyVec3 FlexorHallucisLongus1Node = {0.16247,-0.07546,0.03182}*.TF'*NeutralRot;
////    AnyVec3 FlexorHallucisLongus2Node = {0.16247,-0.07546,0.03182}*.TF'*NeutralRot;
////    AnyVec3 FlexorHallucisLongus3Node = {0.16247,-0.07546,0.03182}*.TF'*NeutralRot;
////    AnyVec3 FlexorHallucisLongusViaNode7 = {-0.02007,-0.03002,-0.00691}*.TF'*NeutralRot;
////    AnyVec3 FlexorHallucisLongusViaNode8 = {0.00695,-0.05818,0.00605}*.TF'*NeutralRot;
////    AnyVec3 TendonCalcaneousNode = {-0.07185,-0.05039,-0.00866}*.TF'*NeutralRot;
////    AnyVec3 TendonCalcaneousMedialNode  = TendonCalcaneousNode-{0,0,0.01}*.TF';
////    AnyVec3 TendonCalcaneousLateralNode = TendonCalcaneousNode+{0,0,0.01}*.TF';
////    AnyVec3 PeroneusBrevis1Node = {0.00951,-0.07091,0.05239}*.TF'*NeutralRot;
////    AnyVec3 PeroneusBrevis2Node = {0.00951,-0.07091,0.05239}*.TF'*NeutralRot;
////    AnyVec3 PeroneusBrevis3Node = {0.00951,-0.07091,0.05239}*.TF'*NeutralRot;
////    AnyVec3 PeroneusBrevisViaNode4 = {-0.04125,-0.01313,0.02093}*.TF'*NeutralRot;
////    AnyVec3 PeroneusLongus1Node = {0.00476,-0.06998,0.05191}*.TF'*NeutralRot;
////    AnyVec3 PeroneusLongus2Node = {0.00476,-0.06998,0.05191}*.TF'*NeutralRot;
////    AnyVec3 PeroneusLongus3Node = {0.00476,-0.06998,0.05191}*.TF'*NeutralRot;
////    AnyVec3 PeroneusTertius1Node = {0.05445,-0.08217,0.06009}*.TF'*NeutralRot;
////    AnyVec3 PeroneusTertius2Node = {0.05445,-0.08217,0.06009}*.TF'*NeutralRot;
////    AnyVec3 PeroneusTertius3Node = {0.05445,-0.08217,0.06009}*.TF'*NeutralRot;
////    AnyVec3 PeroneusLongusViaNode4 = {-0.04125,-0.01313,0.02093}*.TF'*NeutralRot;
////    AnyVec3 TibialisAnterior1Node = {0.05990,-0.04444,0.00209}*.TF'*NeutralRot;
////    AnyVec3 TibialisAnterior2Node = {0.05990,-0.04444,0.00209}*.TF'*NeutralRot;
////    AnyVec3 TibialisAnterior3Node = {0.05990,-0.04444,0.00209}*.TF'*NeutralRot;
////    AnyVec3 TibialisAnteriorViaNode2 = {0.04745,-0.02681,0.00348}*.TF'*NeutralRot;
////    AnyVec3 TibialisPosteriorMedialis1Node = {0.01646,-0.02486,-0.00352}*.TF'*NeutralRot;
////    AnyVec3 TibialisPosteriorMedialis2Node = {0.01646,-0.02486,-0.00352}*.TF'*NeutralRot;
////    AnyVec3 TibialisPosteriorMedialis3Node = {0.01646,-0.02486,-0.00352}*.TF'*NeutralRot;
////    AnyVec3 TibialisPosteriorLateralis1Node = {0.01646,-0.02486,-0.00352}*.TF'*NeutralRot;
////    AnyVec3 TibialisPosteriorLateralis2Node = {0.01646,-0.02486,-0.00352}*.TF'*NeutralRot;
////    AnyVec3 TibialisPosteriorLateralis3Node = {0.01646,-0.02486,-0.00352}*.TF'*NeutralRot;
////    AnyVec3 TibialisPosteriorLateralisViaNode10 = {0.00643,-0.00810,-0.01478}*.TF'*NeutralRot;
////    AnyVec3 TibialisPosteriorMedialisViaNode10 = {-0.00823,-0.00387,-0.02379}*.TF'*NeutralRot;
////    AnyVec3 TibialisPosteriorMedialisViaNode11 = {0.00643,-0.00810,-0.01478}*.TF'*NeutralRot;
//    AnyVec3 OriginalHeelNode = {-0.06737,-0.05000,-0.01499}*.TF'*NeutralRot;
//    AnyVec3 MetatarsalProximal5 = {0.03583,-0.06500,0.05594}*.TF'*NeutralRot;
//    AnyVec3 MetatarsalDistal1 = {0.12105,-0.06499,-0.00475}*.TF'*NeutralRot;
//
//    AnyVec3 MedialMalleolus = {0.02022,0.01028,-0.03249}*.TF'*NeutralRot;
//    AnyVec3 LateralMalleolus = {-0.02016,-0.01038,0.03255}*.TF'*NeutralRot;
//    AnyVec3 MedialTibialEpicondyle = {0.00004,0.36417,-0.04276}*.TF'*NeutralRot;
//    AnyVec3 LateralTibialEpicondyle = {0.00005,0.36910,0.04280}*.TF'*NeutralRot;
//
//
//
//
//    AnyVec3 TendonCalcaneousNode = {-0.079349,-0.008614,-0.011651}*.TF';
//    AnyVec3 TendonCalcaneousMedialisNode  = TendonCalcaneousNode-{0,0,0.005}*.TF';
//    AnyVec3 TendonCalcaneousLateralisNode = TendonCalcaneousNode+{0,0,0.005}*.TF';
//    AnyVec3 GastrocnemiusLateralis1Node = TendonCalcaneousLateralisNode;
//    AnyVec3 GastrocnemiusMedialis1Node =  TendonCalcaneousMedialisNode;
//    AnyVec3 Plantaris1Node = TendonCalcaneousNode;
//    AnyVec3 SoleusMedialis1Node = TendonCalcaneousMedialisNode;
//    AnyVec3 SoleusMedialis2Node = TendonCalcaneousMedialisNode;
//    AnyVec3 SoleusMedialis3Node =  TendonCalcaneousMedialisNode;
//    AnyVec3 SoleusLateralis1Node = TendonCalcaneousLateralisNode;
//    AnyVec3 SoleusLateralis2Node = TendonCalcaneousLateralisNode;
//    AnyVec3 SoleusLateralis3Node = TendonCalcaneousLateralisNode;
//
//    AnyVec3 PeroneusBrevis1Node = {-0.006834,-0.017013,0.041808}*.TF';
//    AnyVec3 PeroneusBrevisProximal1Node = {0.051374,-0.034037,0.056427}*.TF';
//    AnyVec3 PeroneusBrevisViaNode4 = {-0.050640,0.018522,0.012904}*.TF';
//    AnyVec3 PeroneusBrevisViaNode5 = {-0.016424,-0.007515,0.032042}*.TF';
//
//    AnyVec3 PeroneusLongus1Node = {0.038878,-0.012559,0.007434}*.TF';
//    AnyVec3 PeroneusLongusViaNode5 = {-0.050540,0.011274,0.015480}*.TF';
//    AnyVec3 PeroneusLongusViaNode6 = {-0.038730,-0.004789,0.021973}*.TF';
//    AnyVec3 PeroneusLongusViaNode7 = {-0.008174,-0.019440,0.028116}*.TF';
//
//    AnyVec3 TibialisAnterior1Node  = {0.032556,-0.018370,0.004878}*.TF';
//    AnyVec3 TibialisAnteriorViaNode2 = {0.000136,0.019824,-0.017392}*.TF';
//    AnyVec3 TibialisAnteriorViaNode3  = {0.024954,-0.019155,-0.007012}*.TF';
//
//    AnyVec3 TibialisPosterior1Node = {0.004481,-0.008744,-0.014187}*.TF';
//    AnyVec3 TibialisPosteriorViaNode7 = {-0.019760,0.004412,-0.029507}*.TF';
//    AnyVec3 TibialisPosteriorViaNode6 = {-0.023909,0.011187,-0.032035}*.TF';
//    AnyVec3 TibialisPosteriorViaNode5 = {-0.027472,0.016797,-0.034359}*.TF';
//
//    AnyVec3 ExtensorHallucisLongus1Node  = {0.125486,-0.030678,0.024512}*.TF';
//    AnyVec3 ExtensorHallucisLongusViaNode4 = {0.009876,0.021500,-0.005428}*.TF';
//    AnyVec3 ExtensorHallucisLongusViaNode5 = {0.084558,-0.017349,0.005053}*.TF';
//
//    AnyVec3 ExtensorDigitorumLongus1Node  = {0.122955,-0.034093,0.049820}*.TF';
//    AnyVec3 ExtensorDigitorumLongus2Node  = {0.116000,-0.033172,0.060440}*.TF';
//    AnyVec3 ExtensorDigitorumLongus3Node  = {0.105157,-0.032289,0.068461}*.TF';
//    AnyVec3 ExtensorDigitorumLongus4Node  = {0.089070,-0.032117,0.071754}*.TF';
//    AnyVec3 ExtensorDigitorumLongusViaNode5 = {-0.019027,0.026011,0.000924}*.TF';
//    AnyVec3 ExtensorDigitorumLongusViaNode6 = {0.002471,0.020137,0.005674}*.TF';
//    AnyVec3 ExtensorDigitorumLongusViaNode7 = {0.079288,-0.018683,0.026992}*.TF';
//    AnyVec3 ExtensorDigitorumLongusViaNode8 = {0.074937,-0.019325,0.037667}*.TF';
//    AnyVec3 ExtensorDigitorumLongusViaNode9 = {0.066417,-0.021731,0.047146}*.TF';
//    AnyVec3 ExtensorDigitorumLongusViaNode10 = {0.055019,-0.022102,0.056800}*.TF';
//
//    AnyVec3 FlexorDigitorumLongus1Node = {0.119877,-0.040061,0.048427}*.TF';
//    AnyVec3 FlexorDigitorumLongus2Node = {0.114073,-0.038927,0.059735}*.TF';
//    AnyVec3 FlexorDigitorumLongus3Node = {0.103136,-0.037997,0.066973}*.TF';
//    AnyVec3 FlexorDigitorumLongus4Node = {0.086668,-0.036036,0.070305}*.TF';
//    AnyVec3 FlexorDigitorumLongusViaNode7 = {-0.026541,-0.000667,-0.026853}*.TF';
//    AnyVec3 FlexorDigitorumLongusViaNode8 = {-0.021639,-0.001728,-0.024111}*.TF';
//    AnyVec3 FlexorDigitorumLongusViaNode9 = {0.077624,-0.031480,0.024947}*.TF';
//    AnyVec3 FlexorDigitorumLongusViaNode10 = {0.073682,-0.031718,0.034957}*.TF';
//    AnyVec3 FlexorDigitorumLongusViaNode11 = {0.065002,-0.034096,0.044178}*.TF';
//    AnyVec3 FlexorDigitorumLongusViaNode12 = {0.053740,-0.034132,0.053745}*.TF';
//
//    AnyVec3 FlexorHallucisLongus1Node  = {0.120913,-0.039319,0.024121}*.TF';
//    AnyVec3 FlexorHallucisLongusViaNode7 = {-0.044277,0.007974,-0.021763}*.TF';
//    AnyVec3 FlexorHallucisLongusViaNode8 = {0.081970,-0.034073,0.009676}*.TF';
//
//
//
//    AnyVec3 HeelContact = {-0.070000,-0.037500,0.010000}*.TF';
//    AnyVec3 Metatarsal1Contact = {0.082261,-0.037500,-0.008106}*.TF';
//    AnyVec3 Metatarsal5Contact = {0.052576,-0.037500,0.064319}*.TF';
//    AnyVec3 MetatarsalJoint = {0.085208,-0.027672,0.028305}*.TF';
//    AnyVec3 Metatarsal2Contact = {0.074840,-0.037500,0.010000}*.TF';
//   };
};
